# OpenSim document version 30000
Model DAS3_IRSST:
  credits: Model authors names..
  publications: List of publications related to model...
  length_units: meters
  force_units: N
  gravity: 0 0 -9.80665
  BodySet:
    Body ground: mass=0 mass_center=(0 0 0) inertia_xx=0 inertia_yy=0 inertia_zz=0
    Body box: mass=0.1 mass_center=(0 0 0) inertia_xx=1e-5 inertia_yy=1e-5 inertia_zz=1e-5 meshes=box_manutention.vtp
      CustomJoint ground_box: parent_body=ground location_in_parent=(0 0 0) location=(0 0 0)
        Coordinate box_rotX: motion_type=rotational default_value=0 range=(-4 4) clamped=true
        Coordinate box_rotY: motion_type=rotational default_value=0 range=(-4 4) clamped=true
        Coordinate box_rotZ: motion_type=rotational default_value=0 range=(-4 4) clamped=true
        Coordinate box_transX: motion_type=translational default_value=0 range=(-25 25) clamped=true
        Coordinate box_transY: motion_type=translational default_value=0 range=(-25 25) clamped=true
        Coordinate box_transZ: motion_type=translational default_value=0 range=(-25 25) clamped=true
        SpatialTransform:
          TransformAxis rotation1: coordinates=box_rotX axis=(1 0 0) LinearFunction(coefficients=1 0)
          TransformAxis rotation2: coordinates=box_rotY axis=(0 1 0) LinearFunction(coefficients=1 0)
          TransformAxis rotation3: coordinates=box_rotZ axis=(0 0 1) LinearFunction(coefficients=1 0)
          TransformAxis translation1: coordinates=box_transX axis=(1 0 0) LinearFunction(coefficients=1 0)
          TransformAxis translation2: coordinates=box_transY axis=(0 1 0) LinearFunction(coefficients=1 0)
          TransformAxis translation3: coordinates=box_transZ axis=(0 0 1) LinearFunction(coefficients=1 0)
    Body sensor1: mass=0 mass_center=(0 0 0) inertia_xx=0 inertia_yy=0 inertia_zz=0 meshes=sensor1.vtp
      WeldJoint box-sensor1: parent_body=box location_in_parent=(0.097 -0.046 0.213)
          orientation_in_parent=(0 -1.5708 0) location=(0 0 0)
    Body thoraxPre: mass=0 mass_center=(0 0 0) inertia_xx=0 inertia_yy=0 inertia_zz=0
        meshes=(ground_ribs.vtp ground_spine.vtp ground_skull.vtp ground_jaw.vtp)
      CustomJoint ground_thorax: parent_body=ground location_in_parent=(0 0 0) orientation_in_parent=(1.5708 1.5708 0)
          location=(0 0 0)
        Coordinate Th_rotY: motion_type=rotational default_value=0 range=(-4 5.3) clamped=true
        Coordinate Th_rotX: motion_type=rotational default_value=0 range=(-3.14 3.14) clamped=true
        Coordinate Th_rotZ: motion_type=rotational default_value=0 range=(-3.14 3.14) clamped=true
        Coordinate Th_transX: motion_type=translational default_value=0 range=(-25 25) clamped=true
        Coordinate Th_transY: motion_type=translational default_value=0 range=(-25 25) clamped=true
        Coordinate Th_transZ: motion_type=translational default_value=0 range=(-25 25) clamped=true
        SpatialTransform:
          TransformAxis rotation1: coordinates=Th_rotY axis=(0 1 0) LinearFunction(coefficients=1 0)
          TransformAxis rotation2: coordinates=Th_rotX axis=(1 0 0) LinearFunction(coefficients=1 0)
          TransformAxis rotation3: coordinates=Th_rotZ axis=(0 0 1) LinearFunction(coefficients=1 0)
          TransformAxis translation1: coordinates=Th_transX axis=(1 0 0) LinearFunction(coefficients=1 0)
          TransformAxis translation2: coordinates=Th_transY axis=(0 1 0) LinearFunction(coefficients=1 0)
          TransformAxis translation3: coordinates=Th_transZ axis=(0 0 1) LinearFunction(coefficients=1 0)
    Body thorax: mass=64.81948 mass_center=(0 -0.216148 0.0859647) inertia_xx=2.927631 inertia_yy=1.245654
        inertia_zz=2.927631
      WeldJoint base: parent_body=thoraxPre location_in_parent=(0 0 0) location=(0 0 0)
      WrapEllipsoid serr_ant: xyz_body_rotation=(0.3 0 0) translation=(-0.00727282 -0.218185 0.02728) quadrant=all
          dimensions=(0.213821 0.302404 0.157311)
    Body clavicle_1: mass=0 mass_center=(0 0 0) inertia_xx=0 inertia_yy=0 inertia_zz=0
      CustomJoint sc1: parent_body=thorax location_in_parent=(0.0490921 -0.000983286 0.0136513) location=(0 0 0)
        Coordinate SC_y: motion_type=rotational default_value=-0.5844408 range=(-1.471976 1.4) clamped=true
        SpatialTransform: axes_held_at_zero=(rotation2 rotation3 translation1 translation2 translation3)
          TransformAxis rotation1: coordinates=SC_y axis=(0 1 0) LinearFunction(coefficients=1 0)
    Body clavicle_2: mass=0 mass_center=(0 0 0) inertia_xx=0 inertia_yy=0 inertia_zz=0
      CustomJoint sc2: parent_body=clavicle_1 location_in_parent=(0 0 0) location=(0 0 0)
        Coordinate SC_z: motion_type=rotational default_value=0.03744168 range=(-1.3 1.3) clamped=true
        SpatialTransform: axes_held_at_zero=(rotation1 rotation3 translation1 translation2 translation3)
          TransformAxis rotation2: coordinates=SC_z axis=(0 0 1) LinearFunction(coefficients=1 0)
    Body clavicle_r: mass=0.1662507 mass_center=(0.10813 0.01837 0.00462) inertia_xx=8.252853e-6 inertia_yy=3.391407e-5
        inertia_zz=3.133505e-5 inertia_xy=-8.639706e-6 inertia_xz=-1.225033e-5 inertia_yz=3.739574e-6
        meshes=rclavicle.vtp
      CustomJoint sc3: parent_body=clavicle_2 location_in_parent=(0 0 0) location=(0 0 0)
        Coordinate SC_x: motion_type=rotational default_value=0.36 range=(0.35 0.38) clamped=true locked=true
        SpatialTransform: axes_held_at_zero=(rotation1 rotation2 translation1 translation2 translation3)
          TransformAxis rotation3: coordinates=SC_x axis=(1 0 0) LinearFunction(coefficients=1 0)
    Body scapula: mass=0.7517514 mass_center=(-0.0693734 -0.0299745 -0.0323306) inertia_xx=0.001825884
        inertia_yy=0.001825884 inertia_zz=0.001825884 meshes=rscapula.vtp
      CustomJoint ac3: parent_body=clavicle_r location_in_parent=(0.22847 -0.00011 0.03102) location=(0 0 0)
        Coordinate AC_y: motion_type=rotational default_value=0.7953626 range=(-1.57 1.57) clamped=false
        Coordinate AC_z: motion_type=rotational default_value=0.00799797 range=(-1.4 1.4) clamped=false
        Coordinate AC_x: motion_type=rotational default_value=-0.2105165 range=(-1.4 1.349066) clamped=false
        SpatialTransform: axes_held_at_zero=(translation1 translation2 translation3)
          TransformAxis rotation1: coordinates=AC_y axis=(0 1 0) LinearFunction(coefficients=1 0)
          TransformAxis rotation2: coordinates=AC_z axis=(0 0 1) LinearFunction(coefficients=1 0)
          TransformAxis rotation3: coordinates=AC_x axis=(1 0 0) LinearFunction(coefficients=1 0)
    Body humerus: mass=2.186729 mass_center=(0.00704866 -0.085465 -0.00396487) inertia_xx=0.01706339
        inertia_yy=0.00256985 inertia_zz=0.01706339 meshes=rhumerus.vtp
      CustomJoint preshoulder1: parent_body=scapula location_in_parent=(0.00478802 -0.021579 -0.0574649)
          location=(0 0 0)
        Coordinate GH_x: motion_type=rotational default_value=-0.6646999 range=(-3.141593 3.141593) clamped=false
        Coordinate GH_y: motion_type=rotational default_value=-0.00379958 range=(-3.14 3.14) clamped=false
        Coordinate GH_z: motion_type=rotational default_value=-0.6049077 range=(-3.141593 3.141593) clamped=false
        SpatialTransform: axes_held_at_zero=(translation1 translation2 translation3)
          TransformAxis rotation1: coordinates=GH_x axis=(1 0 0) LinearFunction(coefficients=1 0)
          TransformAxis rotation2: coordinates=GH_y axis=(0 1 0) LinearFunction(coefficients=1 0)
          TransformAxis rotation3: coordinates=GH_z axis=(0 0 1) LinearFunction(coefficients=1 0)
      WrapSphere deltoid: xyz_body_rotation=(-0.193033 -0.238063 -0.385718)
          translation=(0.00242298 -0.000991217 -0.00198243) quadrant=all radius=0.02995679
      WrapSphere inf_sup_sub: xyz_body_rotation=(-0.193033 -0.238063 -0.385718)
          translation=(-0.0018723 0.00198243 -0.00143176) quadrant=all radius=0.02544124
      WrapCylinder infra_cyl: xyz_body_rotation=(1.56643 0.00610865 -0.953124)
          translation=(0.0059473 -0.0253311 -0.00484595) quadrant=-x radius=0.01541893 length=0.1321623
      WrapCylinder ter_min_cyl: xyz_body_rotation=(1.56643 0.00610865 -1.47672)
          translation=(0.0059473 -0.0253311 -0.00484595) quadrant=-x radius=0.01652029 length=0.1101352
      WrapCylinder ter_lat_pec: xyz_body_rotation=(1.56643 0.00610865 -0.953124)
          translation=(0.00627771 -0.0803987 -0.00462568) quadrant=all radius=0.01101352 length=0.1101352
      WrapSphere tete_hum_small: translation=(0.003 0 0) quadrant=all radius=0.02657039
    Body ulna_r: mass=0.5823036 mass_center=(-0.000350273 -0.0740244 -0.00455355) inertia_xx=0.004443427
        inertia_yy=0.0006584872 inertia_zz=0.004443427 meshes=rulna.vtp
      CustomJoint hu: parent_body=humerus location_in_parent=(0.006387844 -0.3201632 0.005396627) location=(0 0 0)
        Coordinate EL_x: motion_type=rotational default_value=0.08726646 range=(0.08726646 2.443461) clamped=false
        SpatialTransform: axes_held_at_zero=(rotation2 rotation3 translation1 translation2 translation3)
          TransformAxis rotation1: coordinates=EL_x axis=(0.9997661 0.008446 -0.019909)
              LinearFunction(coefficients=1 0)
      WrapCylinder elbow: xyz_body_rotation=(-2.51153 1.54654 2.79253) translation=(0 0 0) quadrant=y radius=0.02218395
          length=0.05837883
      WrapCylinder elbow_circ: xyz_body_rotation=(0.630064 -1.54654 0) translation=(0 0 0) quadrant=all
          radius=0.01751365 length=0.05837883
      WrapCylinder pron_quad: xyz_body_rotation=(-1.28805 -0.232652 0) translation=(0.0426165 -0.240988 -0.0673692)
          quadrant=y radius=0.008173036 length=0.1167577
    Body radius_r: mass=0.5823036 mass_center=(0.0126423 -0.140615 -0.0153854) inertia_xx=0.004636444
        inertia_yy=0.0006870912 inertia_zz=0.004636444 meshes=rradius.vtp
      CustomJoint ur: parent_body=ulna_r location_in_parent=(0.01996556 -0.01552877 -0.0190315) location=(0 0 0)
        Coordinate PS_y: motion_type=rotational default_value=0.08726646 range=(-2 2.792527) clamped=false
        SpatialTransform: axes_held_at_zero=(rotation2 rotation3 translation1 translation2 translation3)
          TransformAxis rotation1: coordinates=PS_y axis=(-0.113295 0.9740588 0.195892)
              LinearFunction(coefficients=1 0)
      WrapCylinder radius: xyz_body_rotation=(-1.61286 -0.202284 -1.77709)
          translation=(0.00417433 -0.0384038 -0.0003578) quadrant=-x radius=0.01097253 length=0.2385332
      WrapCylinder supinator: xyz_body_rotation=(-1.48877 0.00174533 0) translation=(0.00405506 -0.142643 -0.0082294)
          quadrant=-y radius=0.010734 length=0.2385332
      WrapCylinder ulna_radius: xyz_body_rotation=(1.54095 0.256214 2.67035)
          translation=(0.0174129 -0.106267 0.0003578) quadrant=-x radius=0.008467929 length=0.1192666
    Body hand_r: mass=0.5594974 mass_center=(0 -0.0881854 0.000750514) inertia_xx=0.001065003 inertia_yy=0.0003174833
        inertia_zz=0.001065003 meshes=r_hand.vtp
      CustomJoint rc: parent_body=radius_r location_in_parent=(0.01192666 -0.2660838 -0.07776183)
          location=(-0.01250857 -0.005003427 0)
        Coordinate wrist_dev_r: motion_type=rotational default_value=0 range=(-1 0.7) clamped=true
        Coordinate wrist_flex_r: motion_type=rotational default_value=0 range=(-1.6 1.6) clamped=true
        SpatialTransform: axes_held_at_zero=(rotation3 translation1 translation2 translation3)
          TransformAxis rotation1: coordinates=wrist_dev_r axis=(1 0 0)
            SimmSpline: x=(-0.174533 0 0.436332) y=(-0.174533 0 0.436332)
          TransformAxis rotation2: coordinates=wrist_flex_r axis=(0 0 1)
            SimmSpline: x=(-1.5708 1.5708) y=(-0.785398 0.785398)
  ForceSet:
    Thelen2003Muscle trap_scap_1: max_isometric_force=240 optimal_fiber_length=0.1675282
        tendon_slack_length=0.003475689 pennation_angle_at_optimal=0 [radians]
      PathPoint P1: thorax (-0.011782 0.0776737 0.165966)
      PathPoint P2: scapula (-0.0193984 0.0226838 -0.0190057)
    Thelen2003Muscle trap_scap_2: max_isometric_force=340 optimal_fiber_length=0.1286222 tendon_slack_length=0.03081454
        pennation_angle_at_optimal=0
      PathPoint P1: thorax (-0.0116365 0.0734555 0.167711)
      PathPoint P2: scapula (-0.0433387 0.0206157 -0.00371737)
    Thelen2003Muscle trap_scap_3: max_isometric_force=400 optimal_fiber_length=0.05093909
        tendon_slack_length=0.06103468 pennation_angle_at_optimal=0
      PathPoint P1: thorax (-0.00625463 0.061819 0.171348)
      PathPoint P2: scapula (-0.0732609 0.016846 -0.00147909)
    Thelen2003Muscle trap_scap_4: max_isometric_force=280 optimal_fiber_length=0.02771962
        tendon_slack_length=0.05996996 pennation_angle_at_optimal=0
      PathPoint P1: thorax (-0.00538189 0.0541098 0.176584)
      PathPoint P2: scapula (-0.0901854 0.0155763 -0.0012304)
    Thelen2003Muscle trap_scap_5: max_isometric_force=244 optimal_fiber_length=0.04357506
        tendon_slack_length=0.03923298 pennation_angle_at_optimal=0
      PathPoint P1: thorax (-0.00450915 0.0379641 0.181821)
      PathPoint P2: scapula (-0.0995705 0.0178669 -0.0088222)
    Thelen2003Muscle trap_scap_6: max_isometric_force=202 optimal_fiber_length=0.06616982
        tendon_slack_length=0.03553868 pennation_angle_at_optimal=0
      PathPoint P1: thorax (-0.00625463 -0.000290913 0.198257)
      PathPoint P2: scapula (-0.0892823 0.00946358 0.00362574)
    Thelen2003Muscle trap_scap_7: max_isometric_force=200 optimal_fiber_length=0.09661802
        tendon_slack_length=0.04007199 pennation_angle_at_optimal=0
      PathPoint P1: thorax (-0.0023273 -0.0493097 0.213675)
      PathPoint P2: scapula (-0.0995705 0.0178669 -0.0088222)
    Thelen2003Muscle trap_scap_8: max_isometric_force=280 optimal_fiber_length=0.08696587
        tendon_slack_length=0.05421249 pennation_angle_at_optimal=0
      PathPoint P1: thorax (0.00538189 -0.0914921 0.219785)
      PathPoint P2: scapula (-0.0984448 0.0114662 0.00119113)
    Thelen2003Muscle trap_scap_9: max_isometric_force=246 optimal_fiber_length=0.1387198 tendon_slack_length=0.04665157
        pennation_angle_at_optimal=0
      PathPoint P1: thorax (0.00960012 -0.161311 0.221385)
      PathPoint P2: scapula (-0.12283 0.0134427 -0.00799758)
    Thelen2003Muscle trap_scap10: max_isometric_force=160 optimal_fiber_length=0.1784746 tendon_slack_length=0.04941939
        pennation_angle_at_optimal=0
      PathPoint P1: thorax (0.0148366 -0.21513 0.224003)
      PathPoint P2: scapula (-0.116574 0.00611271 -0.00227754)
    Thelen2003Muscle trap_scap11: max_isometric_force=184 optimal_fiber_length=0.2112181 tendon_slack_length=0.04374731
        pennation_angle_at_optimal=0
      PathPoint P1: thorax (0.0196366 -0.260949 0.214839)
      PathPoint P2: scapula (-0.108157 0.00456817 0.000706823)
    Thelen2003Muscle trap_clav_1: max_isometric_force=200 optimal_fiber_length=0.1464411 tendon_slack_length=0.0657578
        pennation_angle_at_optimal=0
      PathPoint P1: thorax (-0.0141093 0.188221 0.163493)
      PathPoint P2: clavicle_r (0.146971 0.029579 0.013288)
    Thelen2003Muscle trap_clav_2: max_isometric_force=100 optimal_fiber_length=0.1301644 tendon_slack_length=0.05254111
        pennation_angle_at_optimal=0
      PathPoint P1: thorax (-0.0154184 0.104292 0.155057)
      PathPoint P2: clavicle_r (0.176077 0.027357 0.013354)
    Thelen2003Muscle lev_scap_1: max_isometric_force=200 optimal_fiber_length=0.2139169 tendon_slack_length=0.02575679
        pennation_angle_at_optimal=0
      PathPoint P1: thorax (0.0564371 0.21513 0.0832011)
      PathPoint P2: scapula (-0.151391 0.0162569 -0.0176313)
    Thelen2003Muscle lev_scap_2: max_isometric_force=208 optimal_fiber_length=0.1734516 tendon_slack_length=0.02397948
        pennation_angle_at_optimal=0
      PathPoint P1: thorax (0.0423278 0.182402 0.088292)
      PathPoint P2: scapula (-0.142595 0.0323175 -0.0269771)
    Thelen2003Muscle pect_min_1: max_isometric_force=100 optimal_fiber_length=0.1064109 tendon_slack_length=0.05094063
        pennation_angle_at_optimal=0
      PathPoint P1: thorax (0.0619285 -0.0969048 -0.088372)
      PathPoint P2: scapula (-0.0375009 0.00344249 -0.104728)
      PathWrap: wrap_object=serr_ant method=hybrid
    Thelen2003Muscle pect_min_2: max_isometric_force=214 optimal_fiber_length=0.1537166 tendon_slack_length=0.046707
        pennation_angle_at_optimal=0
      PathPoint P1: thorax (0.0865128 -0.133903 -0.102952)
      PathPoint P2: scapula (-0.0375009 0.00344249 -0.105)
      PathWrap: wrap_object=serr_ant method=hybrid
    Thelen2003Muscle pect_min_3: max_isometric_force=214 optimal_fiber_length=0.1301507 tendon_slack_length=0.03511042
        pennation_angle_at_optimal=0
      PathPoint P1: thorax (0.121252 -0.127462 -0.0844065)
      PathPoint P2: scapula (-0.0319772 -0.00454199 -0.108314)
    Thelen2003Muscle pect_min_4: max_isometric_force=92 optimal_fiber_length=0.1581378 tendon_slack_length=0.03165519
        pennation_angle_at_optimal=0
      PathPoint P1: thorax (0.134755 -0.115646 -0.074795)
      PathPoint P2: scapula (-0.0260216 -0.0152229 -0.109885)
      PathWrap: wrap_object=serr_ant method=hybrid
    Thelen2003Muscle rhomboid_1: max_isometric_force=102 optimal_fiber_length=0.1251177 tendon_slack_length=0.01903413
        pennation_angle_at_optimal=0
      PathPoint P1: thorax (-0.0132365 0.0912012 0.157093)
      PathPoint P2: scapula (-0.15325 -0.0055106 -0.0154716)
    Thelen2003Muscle rhomboid_2: max_isometric_force=184 optimal_fiber_length=0.1395376 tendon_slack_length=0.08551052
        pennation_angle_at_optimal=0
      PathPoint P1: thorax (-0.0110547 0.0736009 0.16742)
      PathPoint P2: scapula (-0.165135 -0.0984841 -0.0076049)
    Thelen2003Muscle rhomboid_3: max_isometric_force=284 optimal_fiber_length=0.163495 tendon_slack_length=0.04155551
        pennation_angle_at_optimal=0
      PathPoint P1: thorax (0.00785465 0.0461097 0.182111)
      PathPoint P2: scapula (-0.166797 -0.105487 -0.00683263)
    Thelen2003Muscle rhomboid_4: max_isometric_force=164 optimal_fiber_length=0.1628242 tendon_slack_length=0.03983859
        pennation_angle_at_optimal=0
      PathPoint P1: thorax (-0.00407278 0.00989104 0.196075)
      PathPoint P2: scapula (-0.166274 -0.121325 -0.00658393)
    Thelen2003Muscle rhomboid_5: max_isometric_force=67 optimal_fiber_length=0.1303929 tendon_slack_length=0.05141637
        pennation_angle_at_optimal=0
      PathPoint P1: thorax (0.000727282 -0.0290913 0.210766)
      PathPoint P2: scapula (-0.164847 -0.136731 -0.00938504)
    Thelen2003Muscle serr_ant_1: max_isometric_force=122 optimal_fiber_length=0.2296152 tendon_slack_length=0.03510935
        pennation_angle_at_optimal=0
      PathPoint P2: thorax (0.188932 -0.308031 0.0533082)
      PathPoint P1: scapula (-0.163931 -0.144362 0.00793213)
      PathWrap: wrap_object=serr_ant method=hybrid
    Thelen2003Muscle serr_ant_2: max_isometric_force=220 optimal_fiber_length=0.2274065 tendon_slack_length=0.01227749
        pennation_angle_at_optimal=0
      PathPoint P2: thorax (0.212638 -0.274208 0.00887052)
      PathPoint P1: scapula (-0.16126 -0.143917 0.00678027)
      PathWrap: wrap_object=serr_ant method=hybrid
    Thelen2003Muscle serr_ant_3: max_isometric_force=210 optimal_fiber_length=0.2073019 tendon_slack_length=0.008946445
        pennation_angle_at_optimal=0
      PathPoint P2: thorax (0.217062 -0.207904 0.00344306)
      PathPoint P1: scapula (-0.155135 -0.140448 0.00486923)
      PathWrap: wrap_object=serr_ant method=hybrid
    Thelen2003Muscle serr_ant_4: max_isometric_force=220 optimal_fiber_length=0.1640666 tendon_slack_length=0
        pennation_angle_at_optimal=0
      PathPoint P2: thorax (0.213833 -0.184542 0.0130455)
      PathPoint P1: scapula (-0.15219 -0.135448 0.00396606)
      PathWrap: wrap_object=serr_ant method=hybrid
    Thelen2003Muscle serr_ant_5: max_isometric_force=130 optimal_fiber_length=0.1486444 tendon_slack_length=0.0129872
        pennation_angle_at_optimal=0
      PathPoint P2: thorax (0.195846 -0.124916 0.00676798)
      PathPoint P1: scapula (-0.153498 -0.130474 0.0041624)
      PathWrap: wrap_object=serr_ant method=hybrid
    Thelen2003Muscle serr_ant_6: max_isometric_force=200 optimal_fiber_length=0.1423585 tendon_slack_length=0
        pennation_angle_at_optimal=0
      PathPoint P2: thorax (0.163493 -0.0622553 0.0289458)
      PathPoint P1: scapula (-0.149873 -0.123498 0.00287965)
      PathWrap: wrap_object=serr_ant method=hybrid
    Thelen2003Muscle serr_ant_7: max_isometric_force=100 optimal_fiber_length=0.1342893 tendon_slack_length=0.01066729
        pennation_angle_at_optimal=0
      PathPoint P2: thorax (0.145602 -0.0112001 0.0478552)
      PathPoint P1: scapula (-0.135488 -0.0655513 -0.00602109)
      PathWrap: wrap_object=serr_ant method=hybrid
    Thelen2003Muscle serr_ant_8: max_isometric_force=150 optimal_fiber_length=0.1091694 tendon_slack_length=0.0142114
        pennation_angle_at_optimal=0
      PathPoint P2: thorax (0.146911 0.0033455 0.0802919)
      PathPoint P1: scapula (-0.154375 -0.0252362 -0.00827245)
      PathWrap: wrap_object=serr_ant method=hybrid
    Thelen2003Muscle serr_ant_9: max_isometric_force=160 optimal_fiber_length=0.1053454 tendon_slack_length=0.009217723
        pennation_angle_at_optimal=0
      PathPoint P2: thorax (0.142547 0.0090183 0.0794192)
      PathPoint P1: scapula (-0.150409 0.0132857 -0.0227362)
      PathWrap: wrap_object=serr_ant method=hybrid
    Thelen2003Muscle serr_ant10: max_isometric_force=126 optimal_fiber_length=0.08925381
        tendon_slack_length=0.006761652 pennation_angle_at_optimal=0
      PathPoint P2: thorax (0.137311 0.0158547 0.0865466)
      PathPoint P1: scapula (-0.139585 0.0303018 -0.0340584)
      PathWrap: wrap_object=serr_ant method=hybrid
    Thelen2003Muscle serr_ant11: max_isometric_force=50 optimal_fiber_length=0.1260984 tendon_slack_length=0
        pennation_angle_at_optimal=0
      PathPoint P2: thorax (0.142547 0.0090183 0.0794192)
      PathPoint P1: scapula (-0.132529 0.0394643 -0.0422131)
      PathWrap: wrap_object=serr_ant method=hybrid
    Thelen2003Muscle serr_ant12: max_isometric_force=224 optimal_fiber_length=0.1375936 tendon_slack_length=0
        pennation_angle_at_optimal=0
      PathPoint P2: thorax (0.146184 0.00130911 0.0683645)
      PathPoint P1: scapula (-0.116233 0.0460744 -0.0581297)
      PathWrap: wrap_object=serr_ant method=hybrid
    Thelen2003Muscle delt_scap_1: max_isometric_force=580 optimal_fiber_length=0.1340987 tendon_slack_length=0.09510546
        pennation_angle_at_optimal=0.08726646
      PathPoint P1: scapula (-0.108353 -0.00107332 -0.00112568)
      PathPoint P2: humerus (0.0100488 -0.0527506 0.0584176)
      PathPoint P2: humerus (0.0148352 -0.122559 0.0101214)
      PathWrap: wrap_object=deltoid method=hybrid
    Thelen2003Muscle delt_scap_2: max_isometric_force=422 optimal_fiber_length=0.1110897 tendon_slack_length=0.08896544
        pennation_angle_at_optimal=0.08726646
      PathPoint P1: scapula (-0.0654335 0.008207 0.00147909)
      PathPoint P2: humerus (0.0256799 -0.0412612 0.0492589)
      PathPoint P2: humerus (0.017126 -0.106225 0.00581514)
      PathWrap: wrap_object=deltoid method=hybrid
    Thelen2003Muscle delt_scap_3: max_isometric_force=900 optimal_fiber_length=0.09500041
        tendon_slack_length=0.07070859 pennation_angle_at_optimal=0.08726646
      PathPoint P1: scapula (-0.0188224 0.00751327 -0.00184559)
      PathPoint P2: humerus (0.017126 -0.106225 0.00581514)
      PathWrap: wrap_object=deltoid method=hybrid
    Thelen2003Muscle delt_scap_4: max_isometric_force=240 optimal_fiber_length=0.07522416
        tendon_slack_length=0.05082714 pennation_angle_at_optimal=0.08726646
      PathPoint P1: scapula (-0.0039268 -0.00591637 -0.00629596)
      PathPoint P2: humerus (0.0173022 -0.0932515 0.00444946)
      PathWrap: wrap_object=deltoid method=hybrid
    Thelen2003Muscle delt_scap_5: max_isometric_force=240 optimal_fiber_length=0.07532765
        tendon_slack_length=0.04019006 pennation_angle_at_optimal=0.08726646
      PathPoint P1: scapula (0.017003 0.00102097 -0.0226969)
      PathPoint P2: humerus (0.0184807 -0.0857072 0.000726893)
      PathWrap: wrap_object=deltoid method=hybrid
    Thelen2003Muscle delt_scap_6: max_isometric_force=570 optimal_fiber_length=0.08692093
        tendon_slack_length=0.07592832 pennation_angle_at_optimal=0.08726646
      PathPoint P1: scapula (0.00473833 0.00696352 -0.00657084)
      PathPoint P2: humerus (0.0181283 -0.119981 0.00727994)
      PathWrap: wrap_object=deltoid method=hybrid
    Thelen2003Muscle delt_scap_7: max_isometric_force=300 optimal_fiber_length=0.08450032 tendon_slack_length=0.0918969
        pennation_angle_at_optimal=0.08726646
      PathPoint P1: scapula (0.0111128 0.000353412 -0.012016)
      PathPoint P2: humerus (0.0173904 -0.144938 0.00568298)
      PathWrap: wrap_object=deltoid method=hybrid
    Thelen2003Muscle delt_scap_8: max_isometric_force=430 optimal_fiber_length=0.08079855 tendon_slack_length=0.0739705
        pennation_angle_at_optimal=0.08726646
      PathPoint P1: scapula (0.0184821 0.00807611 -0.0236917)
      PathPoint P2: humerus (0.0181283 -0.119981 0.00727994)
      PathWrap: wrap_object=deltoid method=hybrid
    Thelen2003Muscle delt_scap_9: max_isometric_force=580 optimal_fiber_length=0.08324233
        tendon_slack_length=0.08074051 pennation_angle_at_optimal=0.08726646
      PathPoint P1: scapula (0.0205371 0.00628287 -0.0315976)
      PathPoint P2: humerus (0.020342 -0.129277 -0.00544068)
      PathWrap: wrap_object=deltoid method=hybrid
    Thelen2003Muscle delt_scap10: max_isometric_force=900 optimal_fiber_length=0.08518425
        tendon_slack_length=0.07288492 pennation_angle_at_optimal=0.08726646
      PathPoint P1: scapula (0.0231812 0.00664938 -0.0433387)
      PathPoint P2: humerus (0.0201548 -0.116655 -0.00666318)
      PathWrap: wrap_object=deltoid method=hybrid
    Thelen2003Muscle delt_scap11: max_isometric_force=480 optimal_fiber_length=0.08409432
        tendon_slack_length=0.05476971 pennation_angle_at_optimal=0.08726646
      PathPoint P1: scapula (0.0199219 0.0107856 -0.0590067)
      PathPoint P2: humerus (0.0198904 -0.101666 -0.00950467)
      PathWrap: wrap_object=deltoid method=hybrid
    Thelen2003Muscle delt_clav_1: max_isometric_force=260 optimal_fiber_length=0.0926473 tendon_slack_length=0.06870972
        pennation_angle_at_optimal=0.08726646
      PathPoint P1: clavicle_r (0.16599 0.022715 0.001408)
      PathPoint P2: humerus (-0.00556372 -0.0321821 -0.0282758)
      PathPoint P2: humerus (0.0116166 -0.0876735 -0.0067105)
      PathWrap: wrap_object=deltoid method=hybrid
    Thelen2003Muscle delt_clav_2: max_isometric_force=320 optimal_fiber_length=0.1037077 tendon_slack_length=0.09708804
        pennation_angle_at_optimal=0.08726646
      PathPoint P1: clavicle_r (0.142032 0.028358 0.005478)
      PathPoint P2: humerus (-0.00788924 -0.040868 -0.0231982)
      PathPoint P2: humerus (0.00413866 -0.100611 -0.0145363)
      PathWrap: wrap_object=deltoid method=hybrid
    Thelen2003Muscle delt_clav_3: max_isometric_force=210 optimal_fiber_length=0.09093437
        tendon_slack_length=0.07393936 pennation_angle_at_optimal=0.08726646
      PathPoint P1: clavicle_r (0.147719 0.024519 0.000803)
      PathPoint P2: humerus (-0.0017117 -0.0346992 -0.0249475)
      PathPoint P2: humerus (0.0105562 -0.0969227 -0.00791358)
      PathWrap: wrap_object=deltoid method=hybrid
    Thelen2003Muscle delt_clav_4: max_isometric_force=224 optimal_fiber_length=0.1091068 tendon_slack_length=0.08037127
        pennation_angle_at_optimal=0.08726646
      PathPoint P1: clavicle_r (0.145156 0.018051 0.000946)
      PathPoint P2: humerus (-0.00406185 -0.0356378 -0.0235454)
      PathPoint P2: humerus (0.00413701 -0.102283 -0.0142542)
      PathWrap: wrap_object=deltoid method=hybrid
    Thelen2003Muscle coracobr_1: max_isometric_force=400 optimal_fiber_length=0.07471514 tendon_slack_length=0.1041484
        pennation_angle_at_optimal=0
      PathPoint P1: scapula (-0.0105762 -0.0112568 -0.100199)
      PathPoint P2: humerus (-0.00294061 -0.16115 -0.00849143)
    Thelen2003Muscle coracobr_2: max_isometric_force=300 optimal_fiber_length=0.0767994 tendon_slack_length=0.116942
        pennation_angle_at_optimal=0
      PathPoint P1: scapula (-0.0176968 -0.0195554 -0.102843)
      PathPoint P2: humerus (-0.00841433 -0.181558 -0.00193838)
    Thelen2003Muscle coracobr_3: max_isometric_force=228 optimal_fiber_length=0.08221651 tendon_slack_length=0.1277918
        pennation_angle_at_optimal=0
      PathPoint P1: scapula (-0.0121338 -0.0107202 -0.108118)
      PathPoint P2: humerus (-0.00588122 -0.191569 -0.00612352)
    Thelen2003Muscle infra_1: max_isometric_force=540 optimal_fiber_length=0.03985639 tendon_slack_length=0.04793907
        pennation_angle_at_optimal=0
      PathPoint P1: scapula (-0.0797532 -0.0547526 -0.0248697)
      PathPoint P2: humerus (0.021961 0.0108153 0.013844)
      PathWrap: wrap_object=infra_cyl method=hybrid
    Thelen2003Muscle infra_2: max_isometric_force=550 optimal_fiber_length=0.07210258 tendon_slack_length=0.137065
        pennation_angle_at_optimal=0
      PathPoint P1: scapula (-0.165004 -0.120762 0.00150527)
      PathPoint P2: humerus (0.0202098 0.0176216 0.00761035)
      PathWrap: wrap_object=infra_cyl method=hybrid
    Thelen2003Muscle infra_3: max_isometric_force=400 optimal_fiber_length=0.06645833 tendon_slack_length=0.1072747
        pennation_angle_at_optimal=0
      PathPoint P1: scapula (-0.140972 -0.0950023 0.000746091)
      PathPoint P2: humerus (0.0202098 0.0176216 0.00761035)
      PathWrap: wrap_object=infra_cyl method=hybrid
    Thelen2003Muscle infra_4: max_isometric_force=415 optimal_fiber_length=0.06831184 tendon_slack_length=0.09047822
        pennation_angle_at_optimal=0
      PathPoint P1: scapula (-0.142818 -0.0647398 -0.0015969)
      PathPoint P2: humerus (0.0176767 0.0210579 0.00775352)
      PathWrap: wrap_object=infra_cyl method=hybrid
    Thelen2003Muscle infra_5: max_isometric_force=600 optimal_fiber_length=0.06886108 tendon_slack_length=0.06365407
        pennation_angle_at_optimal=0
      PathPoint P1: scapula (-0.136639 -0.0223566 -0.0140318)
      PathPoint P2: humerus (0.0176767 0.0210579 0.00775352)
      PathWrap: wrap_object=infra_cyl method=hybrid
    Thelen2003Muscle infra_6: max_isometric_force=360 optimal_fiber_length=0.07606087 tendon_slack_length=0.04464981
        pennation_angle_at_optimal=0
      PathPoint P1: scapula (-0.105631 -0.000497394 0.00057593)
      PathPoint P2: humerus (0.0211129 0.0140312 0.00920731)
      PathWrap: wrap_object=infra_cyl method=hybrid
    Thelen2003Muscle ter_min_1: max_isometric_force=244 optimal_fiber_length=0.06417913 tendon_slack_length=0.06277001
        pennation_angle_at_optimal=0
      PathPoint P1: scapula (-0.0729075 -0.087044 -0.0183905)
      PathPoint P2: humerus (0.0283929 -0.00774251 0.0096919)
      PathWrap: wrap_object=ter_min_cyl method=hybrid
    Thelen2003Muscle ter_min_2: max_isometric_force=400 optimal_fiber_length=0.07033755 tendon_slack_length=0.0652221
        pennation_angle_at_optimal=0
      PathPoint P1: scapula (-0.0861932 -0.090421 -0.00846879)
      PathPoint P2: humerus (0.030926 -0.00136568 0.00881082)
      PathWrap: wrap_object=ter_min_cyl method=hybrid
    Thelen2003Muscle ter_min_3: max_isometric_force=360 optimal_fiber_length=0.06401293 tendon_slack_length=0.0227714
        pennation_angle_at_optimal=0
      PathPoint P1: scapula (-0.0498572 -0.0550799 -0.0221864)
      PathPoint P2: humerus (0.0283929 -0.00774251 0.0096919)
      PathWrap: wrap_object=ter_min_cyl method=hybrid
    Thelen2003Muscle ter_maj_1: max_isometric_force=320 optimal_fiber_length=0.2159779 tendon_slack_length=0.009184037
        pennation_angle_at_optimal=0
      PathPoint P1: scapula (-0.11444 -0.137333 -0.017147)
      PathPoint P2: humerus (-0.00661913 -0.0722047 -0.0103637)
      PathWrap: wrap_object=ter_lat_pec method=hybrid
    Thelen2003Muscle ter_maj_2: max_isometric_force=180 optimal_fiber_length=0.2482895 tendon_slack_length=0.01868008
        pennation_angle_at_optimal=0
      PathPoint P1: scapula (-0.13448 -0.147229 -0.0136783)
      PathPoint P2: humerus (-0.00314987 -0.092811 -0.0104188)
      PathWrap: wrap_object=ter_lat_pec method=hybrid
    Thelen2003Muscle ter_maj_3: max_isometric_force=400 optimal_fiber_length=0.2443156 tendon_slack_length=0.02401529
        pennation_angle_at_optimal=0
      PathPoint P1: scapula (-0.119414 -0.117896 0.000117804)
      PathPoint P2: humerus (-0.00418514 -0.086324 -0.00990116)
      PathWrap: wrap_object=ter_lat_pec method=hybrid
    Thelen2003Muscle ter_maj_4: max_isometric_force=310 optimal_fiber_length=0.1613172 tendon_slack_length=0.05018102
        pennation_angle_at_optimal=0
      PathPoint P1: scapula (-0.104256 -0.12499 -0.0145553)
      PathPoint P2: humerus (-0.00718082 -0.0548143 -0.0117514)
      PathWrap: wrap_object=ter_lat_pec method=hybrid
    Thelen2003Muscle supra_1: max_isometric_force=240 optimal_fiber_length=0.06757231 tendon_slack_length=0.02123344
        pennation_angle_at_optimal=0
      PathPoint P1: scapula (-0.0798431 0.00827016 -0.0289081)
      PathPoint P2: humerus (0.0255514 0.013833 0.00294061)
      PathWrap: wrap_object=inf_sup_sub method=hybrid
    Thelen2003Muscle supra_2: max_isometric_force=226 optimal_fiber_length=0.07441868 tendon_slack_length=0.03147999
        pennation_angle_at_optimal=0
      PathPoint P1: scapula (-0.0801084 0.0216102 -0.0113855)
      PathPoint P2: humerus (0.0255514 0.013833 0.00294061)
      PathWrap: wrap_object=inf_sup_sub method=hybrid
    Thelen2003Muscle supra_3: max_isometric_force=520 optimal_fiber_length=0.07113501 tendon_slack_length=0.06558547
        pennation_angle_at_optimal=0
      PathPoint P1: scapula (-0.12355 0.0275399 -0.0327364)
      PathPoint P2: humerus (0.0135356 0.021179 -0.0151106)
      PathWrap: wrap_object=inf_sup_sub method=hybrid
    Thelen2003Muscle supra_4: max_isometric_force=260 optimal_fiber_length=0.06963143 tendon_slack_length=0.03896344
        pennation_angle_at_optimal=0
      PathPoint P1: scapula (-0.0966646 0.0277494 -0.0527761)
      PathPoint P2: humerus (0.0135356 0.021179 -0.0151106)
      PathWrap: wrap_object=inf_sup_sub method=hybrid
    Thelen2003Muscle subscap_1: max_isometric_force=88 optimal_fiber_length=0.06956511 tendon_slack_length=0.03503279
        pennation_angle_at_optimal=0
      PathPoint P1: scapula (-0.081036 -0.0172386 -0.0299222)
      PathPoint P2: humerus (-0.0197142 0.0134365 -0.0164102)
      PathPoint P3: humerus (-0.00323798 0.0182164 -0.021179)
      PathWrap: wrap_object=inf_sup_sub method=hybrid
    Thelen2003Muscle subscap_2: max_isometric_force=160 optimal_fiber_length=0.08237084 tendon_slack_length=0.05584464
        pennation_angle_at_optimal=0
      PathPoint P1: scapula (-0.11046 0.0159663 -0.0409555)
      PathPoint P2: humerus (-0.0219169 0.0149784 -0.0121149)
      PathPoint P3: humerus (-0.000572703 0.0142515 -0.0238333)
      PathWrap: wrap_object=inf_sup_sub method=hybrid
    Thelen2003Muscle subscap_3: max_isometric_force=520 optimal_fiber_length=0.08633643 tendon_slack_length=0.0753528
        pennation_angle_at_optimal=0.08726646
      PathPoint P1: scapula (-0.139598 -0.021249 -0.0219814)
      PathPoint P2: humerus (-0.00870068 0.0168507 -0.021146)
      PathPoint P3: humerus (-0.00323798 0.0182164 -0.021179)
      PathWrap: wrap_object=inf_sup_sub method=hybrid
    Thelen2003Muscle subscap_4: max_isometric_force=540 optimal_fiber_length=0.09545634 tendon_slack_length=0.07056585
        pennation_angle_at_optimal=0.08726646
      PathPoint P1: scapula (-0.126487 -0.0595326 -0.0151204)
      PathPoint P2: humerus (0.000385473 0.00705967 -0.0274016)
      PathWrap: wrap_object=inf_sup_sub method=hybrid
    Thelen2003Muscle subscap_5: max_isometric_force=230 optimal_fiber_length=0.08201039 tendon_slack_length=0.08447535
        pennation_angle_at_optimal=0
      PathPoint P1: scapula (-0.114453 -0.0746746 -0.0160213)
      PathPoint P2: humerus (0.00477987 0.00943859 -0.0270712)
      PathWrap: wrap_object=inf_sup_sub method=hybrid
    Thelen2003Muscle subscap_6: max_isometric_force=300 optimal_fiber_length=0.09882806 tendon_slack_length=0.09986563
        pennation_angle_at_optimal=0
      PathPoint P1: scapula (-0.142176 -0.103333 -0.0115426)
      PathPoint P2: humerus (0.00194939 0.0025221 -0.0308709)
      PathWrap: wrap_object=inf_sup_sub method=hybrid
    Thelen2003Muscle subscap_7: max_isometric_force=320 optimal_fiber_length=0.1071151 tendon_slack_length=0.1031963
        pennation_angle_at_optimal=0
      PathPoint P1: scapula (-0.13071 -0.123904 -0.0131809)
      PathPoint P2: humerus (-0.0026873 0.000958177 -0.02934)
      PathWrap: wrap_object=inf_sup_sub method=hybrid
    Thelen2003Muscle subscap_8: max_isometric_force=120 optimal_fiber_length=0.09916268 tendon_slack_length=0.05184977
        pennation_angle_at_optimal=0
      PathPoint P1: scapula (-0.0896226 -0.0856696 -0.0260739)
      PathPoint P2: humerus (-0.0026873 0.000958177 -0.02934)
      PathWrap: wrap_object=inf_sup_sub method=hybrid
    Thelen2003Muscle subscap_9: max_isometric_force=444 optimal_fiber_length=0.09493924 tendon_slack_length=0.07768953
        pennation_angle_at_optimal=0
      PathPoint P1: scapula (-0.104387 -0.120553 -0.0160868)
      PathPoint P2: humerus (-0.00723589 -0.00411906 -0.0256725)
      PathWrap: wrap_object=inf_sup_sub method=hybrid
    Thelen2003Muscle subscap10: max_isometric_force=100 optimal_fiber_length=0.09253052 tendon_slack_length=0.01368795
        pennation_angle_at_optimal=0
      PathPoint P1: scapula (-0.0736419 -0.0690168 -0.0284238)
      PathPoint P2: humerus (-0.00816102 -0.018767 -0.017115)
      PathWrap: wrap_object=inf_sup_sub method=hybrid
    Thelen2003Muscle subscap11: max_isometric_force=30 optimal_fiber_length=0.07578422 tendon_slack_length=0.001489646
        pennation_angle_at_optimal=0
      PathPoint P1: scapula (-0.0472917 -0.0597789 -0.0377103)
      PathPoint P2: humerus (-0.0107272 -0.0251769 -0.0112889)
      PathWrap: wrap_object=inf_sup_sub method=hybrid
    Thelen2003Muscle bic_l: max_isometric_force=700 optimal_fiber_length=0.1446988 tendon_slack_length=0.2615106
        pennation_angle_at_optimal=0
      PathPoint P1: scapula (-0.0183381 -0.00325924 -0.056127)
      PathPoint P2: humerus (0.0238993 0.000110135 -0.00121149)
      PathPoint P3: radius_r (-0.00336332 -0.0430433 -0.0127854)
      PathWrap: wrap_object=inf_sup_sub method=hybrid
      PathWrap: wrap_object=radius method=hybrid
    Thelen2003Muscle bic_b_1: max_isometric_force=250 optimal_fiber_length=0.1319392 tendon_slack_length=0.2157263
        pennation_angle_at_optimal=0
      PathPoint P1: scapula (-0.0119767 -0.0109034 -0.107908)
      PathPoint P2: radius_r (-0.00336332 -0.0430433 -0.0127854)
      PathWrap: wrap_object=radius method=hybrid
    Thelen2003Muscle bic_b_2: max_isometric_force=644 optimal_fiber_length=0.1295711 tendon_slack_length=0.217305
        pennation_angle_at_optimal=0
      PathPoint P1: scapula (-0.0119767 -0.0109034 -0.107908)
      PathPoint P2: radius_r (-0.00336332 -0.0430433 -0.0127854)
      PathWrap: wrap_object=radius method=hybrid
    Thelen2003Muscle tric_long_1: max_isometric_force=446 optimal_fiber_length=0.1080034 tendon_slack_length=0.2186855
        pennation_angle_at_optimal=0.1745329
      PathPoint P2: scapula (-0.0421738 -0.0573051 -0.0269116)
      PathPoint P1: ulna_r (-0.0212382 -0.018868 0.0145597)
      PathWrap: wrap_object=elbow method=hybrid
    Thelen2003Muscle tric_long_2: max_isometric_force=600 optimal_fiber_length=0.09575498 tendon_slack_length=0.2383549
        pennation_angle_at_optimal=0.1745329
      PathPoint P2: scapula (-0.0317416 -0.0548835 -0.0490064)
      PathPoint P1: ulna_r (-0.00605972 -0.0214017 0.00695876)
      PathWrap: wrap_object=elbow method=hybrid
    Thelen2003Muscle tric_long_3: max_isometric_force=560 optimal_fiber_length=0.1290781 tendon_slack_length=0.2378615
        pennation_angle_at_optimal=0.1745329
      PathPoint P2: scapula (-0.0295033 -0.0511923 -0.0364799)
      PathPoint P1: ulna_r (-0.00304737 -0.0563706 0.00692373)
      PathWrap: wrap_object=elbow method=hybrid
    Thelen2003Muscle tric_long_4: max_isometric_force=660 optimal_fiber_length=0.1340361 tendon_slack_length=0.2401935
        pennation_angle_at_optimal=0
      PathPoint P2: scapula (-0.0317416 -0.0548835 -0.0490064)
      PathPoint P1: ulna_r (-0.000338597 -0.0519572 0.00119093)
      PathWrap: wrap_object=elbow method=hybrid
    Thelen2003Muscle lat_dorsi_1: max_isometric_force=110 optimal_fiber_length=0.2147199 tendon_slack_length=0.1208911
        pennation_angle_at_optimal=0
      PathPoint P1: thorax (0.0142547 -0.183275 0.221966)
      PathPoint P2: humerus (0.00151987 -0.0417302 -0.0194279)
      PathWrap: wrap_object=ter_lat_pec method=hybrid
      PathWrap: wrap_object=serr_ant method=hybrid
    Thelen2003Muscle lat_dorsi_2: max_isometric_force=180 optimal_fiber_length=0.3131852 tendon_slack_length=0.1171311
        pennation_angle_at_optimal=0
      PathPoint P1: thorax (0.0189093 -0.286113 0.215566)
      PathPoint P2: humerus (0.00234588 -0.0489771 -0.0189873)
      PathWrap: wrap_object=ter_lat_pec method=hybrid
      PathWrap: wrap_object=serr_ant method=hybrid
    Thelen2003Muscle lat_dorsi_3: max_isometric_force=260 optimal_fiber_length=0.3241716 tendon_slack_length=0.1509252
        pennation_angle_at_optimal=0
      PathPoint P1: thorax (0.0168729 -0.365823 0.202475)
      PathPoint P2: humerus (0.00234588 -0.0489771 -0.0189873)
      PathWrap: wrap_object=ter_lat_pec method=hybrid
      PathWrap: wrap_object=serr_ant method=hybrid
    Thelen2003Muscle lat_dorsi_4: max_isometric_force=200 optimal_fiber_length=0.3665954 tendon_slack_length=0.1746458
        pennation_angle_at_optimal=0
      PathPoint P1: thorax (0.0306913 -0.452224 0.186184)
      PathPoint P2: humerus (0.00151987 -0.0417302 -0.0194279)
      PathWrap: wrap_object=ter_lat_pec method=hybrid
      PathWrap: wrap_object=serr_ant method=hybrid
    Thelen2003Muscle lat_dorsi_5: max_isometric_force=180 optimal_fiber_length=0.3659051 tendon_slack_length=0.1072073
        pennation_angle_at_optimal=0
      PathPoint P1: thorax (0.115201 -0.448588 0.144293)
      PathPoint P2: humerus (0.00151987 -0.0417302 -0.0194279)
      PathWrap: wrap_object=ter_lat_pec method=hybrid
      PathWrap: wrap_object=serr_ant method=hybrid
    Thelen2003Muscle lat_dorsi_6: max_isometric_force=210 optimal_fiber_length=0.405127 tendon_slack_length=0.104479
        pennation_angle_at_optimal=0
      PathPoint P1: thorax (0.151566 -0.433169 0.123783)
      PathPoint P2: humerus (0.00234588 -0.0489771 -0.0189873)
      PathWrap: wrap_object=ter_lat_pec method=hybrid
      PathWrap: wrap_object=serr_ant method=hybrid
    Thelen2003Muscle pect_maj_t_1: max_isometric_force=250 optimal_fiber_length=0.2194733
        tendon_slack_length=0.04193757 pennation_angle_at_optimal=0
      PathPoint P1: thorax (0.136124 -0.207036 -0.09567)
      PathPoint P2: humerus (0.011399 -0.0694953 -0.0190204)
      PathWrap: wrap_object=ter_lat_pec method=hybrid
      PathWrap: wrap_object=serr_ant method=hybrid
    Thelen2003Muscle pect_maj_t_2: max_isometric_force=240 optimal_fiber_length=0.2091255
        tendon_slack_length=0.04913878 pennation_angle_at_optimal=0
      PathPoint P1: thorax (0.0976702 -0.177937 -0.110664)
      PathPoint P2: humerus (0.0119937 -0.075718 -0.018745)
      PathWrap: wrap_object=ter_lat_pec method=hybrid
      PathWrap: wrap_object=serr_ant method=hybrid
    Thelen2003Muscle pect_maj_t_3: max_isometric_force=330 optimal_fiber_length=0.2086113
        tendon_slack_length=0.05966755 pennation_angle_at_optimal=0
      PathPoint P1: thorax (0.0527425 -0.147209 -0.113879)
      PathPoint P2: humerus (0.0118726 -0.0812798 -0.0184477)
      PathWrap: wrap_object=ter_lat_pec method=hybrid
      PathWrap: wrap_object=serr_ant method=hybrid
    Thelen2003Muscle pect_maj_t_4: max_isometric_force=320 optimal_fiber_length=0.2030172 tendon_slack_length=0.0310119
        pennation_angle_at_optimal=0
      PathPoint P1: thorax (0.0345974 -0.125464 -0.112972)
      PathPoint P2: humerus (0.012236 -0.0707949 -0.0192957)
      PathWrap: wrap_object=ter_lat_pec method=hybrid
      PathWrap: wrap_object=serr_ant method=hybrid
    Thelen2003Muscle pect_maj_t_5: max_isometric_force=266 optimal_fiber_length=0.1618712
        tendon_slack_length=0.02805767 pennation_angle_at_optimal=0
      PathPoint P1: thorax (0.0251127 -0.0528043 -0.0754148)
      PathPoint P2: humerus (0.012247 -0.0596713 -0.0199125)
      PathWrap: wrap_object=ter_lat_pec method=hybrid
      PathWrap: wrap_object=serr_ant method=hybrid
    Thelen2003Muscle pect_maj_t_6: max_isometric_force=400 optimal_fiber_length=0.155072 tendon_slack_length=0.0385272
        pennation_angle_at_optimal=0
      PathPoint P1: thorax (0.0295292 -0.0159053 -0.0602762)
      PathPoint P2: humerus (0.012236 -0.0707949 -0.0192957)
      PathWrap: wrap_object=ter_lat_pec method=hybrid
      PathWrap: wrap_object=serr_ant method=hybrid
    Thelen2003Muscle pect_maj_c_1: max_isometric_force=360 optimal_fiber_length=0.1483443
        tendon_slack_length=0.01850223 pennation_angle_at_optimal=0
      PathPoint P1: clavicle_r (0.114409 0.016643 -0.0115662)
      PathPoint P2: humerus (0.00966005 -0.0895404 -0.0133563)
      PathWrap: wrap_object=ter_lat_pec method=hybrid
      PathWrap: wrap_object=serr_ant method=hybrid
    Thelen2003Muscle pect_maj_c_2: max_isometric_force=226 optimal_fiber_length=0.1190716
        tendon_slack_length=0.01527958 pennation_angle_at_optimal=0
      PathPoint P1: clavicle_r (0.105697 0.0131959 -0.020412)
      PathPoint P2: humerus (0.012247 -0.0596713 -0.0199125)
      PathWrap: wrap_object=ter_lat_pec method=hybrid
      PathWrap: wrap_object=serr_ant method=hybrid
    Thelen2003Muscle tric_med_1: max_isometric_force=520 optimal_fiber_length=0.08936646 tendon_slack_length=0.09689672
        pennation_angle_at_optimal=0.296706
      PathPoint P1: humerus (-0.00786366 -0.163595 -7.70947e-5)
      PathPoint P2: ulna_r (-0.0182259 -0.00900202 0.0276015)
      PathWrap: wrap_object=elbow method=hybrid
    Thelen2003Muscle tric_med_2: max_isometric_force=520 optimal_fiber_length=0.08551489 tendon_slack_length=0.1241238
        pennation_angle_at_optimal=0
      PathPoint P1: humerus (-0.00685041 -0.13659 0.00326)
      PathPoint P2: ulna_r (-0.0182259 -0.00900202 0.0276015)
      PathWrap: wrap_object=elbow method=hybrid
    Thelen2003Muscle tric_med_3: max_isometric_force=480 optimal_fiber_length=0.06751081 tendon_slack_length=0.01199943
        pennation_angle_at_optimal=0
      PathPoint P1: humerus (0.0103087 -0.266351 0.0145489)
      PathPoint P2: ulna_r (-0.0182259 -0.00900202 0.0276015)
      PathWrap: wrap_object=elbow method=hybrid
    Thelen2003Muscle tric_med_4: max_isometric_force=422 optimal_fiber_length=0.08285332 tendon_slack_length=0.04486963
        pennation_angle_at_optimal=0.1396263
      PathPoint P1: humerus (0.00290757 -0.220149 0.0177868)
      PathPoint P2: ulna_r (-0.0182259 -0.00900202 0.0276015)
      PathWrap: wrap_object=elbow method=hybrid
    Thelen2003Muscle tric_med_5: max_isometric_force=214 optimal_fiber_length=0.08936311 tendon_slack_length=0.0817224
        pennation_angle_at_optimal=0
      PathPoint P1: humerus (-0.00638784 -0.172318 0.0100113)
      PathPoint P2: ulna_r (-0.0182259 -0.00900202 0.0276015)
      PathWrap: wrap_object=elbow method=hybrid
    Thelen2003Muscle brachialis_1: max_isometric_force=314 optimal_fiber_length=0.09793064
        tendon_slack_length=0.09021693 pennation_angle_at_optimal=0
      PathPoint P1: humerus (0.0105069 -0.163595 0.00688345)
      PathPoint P2: ulna_r (-0.017934 -0.0518754 -0.00712222)
      PathWrap: wrap_object=elbow_circ method=hybrid
    Thelen2003Muscle brachialis_2: max_isometric_force=158 optimal_fiber_length=0.1065059
        tendon_slack_length=0.06616106 pennation_angle_at_optimal=0
      PathPoint P1: humerus (-0.00313885 -0.169608 -0.00569399)
      PathPoint P2: ulna_r (-0.0223124 -0.0491083 -0.00384133)
      PathWrap: wrap_object=elbow_circ method=hybrid
    Thelen2003Muscle brachialis_3: max_isometric_force=157 optimal_fiber_length=0.0972582
        tendon_slack_length=0.04404567 pennation_angle_at_optimal=0
      PathPoint P1: humerus (-0.00958177 -0.198629 -0.000363446)
      PathPoint P2: ulna_r (-0.029096 -0.0359147 -0.000432003)
      PathWrap: wrap_object=elbow_circ method=hybrid
    Thelen2003Muscle brachialis_4: max_isometric_force=87 optimal_fiber_length=0.08503617
        tendon_slack_length=0.03556262 pennation_angle_at_optimal=0
      PathPoint P1: humerus (-0.000198243 -0.210116 -0.00114541)
      PathPoint P2: ulna_r (-0.0184594 -0.0486412 -0.00537085)
      PathWrap: wrap_object=elbow_circ method=hybrid
    Thelen2003Muscle brachialis_5: max_isometric_force=101 optimal_fiber_length=0.06976931 tendon_slack_length=0.023557
        pennation_angle_at_optimal=0
      PathPoint P1: humerus (-0.0139651 -0.243773 0.00566095)
      PathPoint P2: ulna_r (-0.0258968 -0.0438542 -0.00217169)
      PathWrap: wrap_object=elbow_circ method=hybrid
    Thelen2003Muscle brachialis_6: max_isometric_force=104 optimal_fiber_length=0.05327282
        tendon_slack_length=0.03950315 pennation_angle_at_optimal=0
      PathPoint P1: humerus (-0.00218068 -0.252948 0.000231284)
      PathPoint P2: ulna_r (-0.0285472 -0.0382148 -0.00330424)
      PathWrap: wrap_object=elbow_circ method=hybrid
    Thelen2003Muscle brachialis_7: max_isometric_force=118 optimal_fiber_length=0.07023066
        tendon_slack_length=0.008595057 pennation_angle_at_optimal=0
      PathPoint P1: humerus (-0.0138881 -0.26058 0.0043944)
      PathPoint P2: ulna_r (-0.015015 -0.0463061 -0.00669021)
      PathWrap: wrap_object=elbow_circ method=hybrid
    Thelen2003Muscle brachiorad_1: max_isometric_force=30 optimal_fiber_length=0.1883881 tendon_slack_length=0.1398019
        pennation_angle_at_optimal=0
      PathPoint P1: humerus (0.00310581 -0.219918 0.00963683)
      PathPoint P2: radius_r (0.00968445 -0.268505 -0.0839279)
    Thelen2003Muscle brachiorad_2: max_isometric_force=82 optimal_fiber_length=0.188897 tendon_slack_length=0.1401796
        pennation_angle_at_optimal=0
      PathPoint P1: humerus (0.00491203 -0.239544 0.0168727)
      PathPoint P2: radius_r (0.00968445 -0.268505 -0.0839279)
    Thelen2003Muscle brachiorad_3: max_isometric_force=52 optimal_fiber_length=0.1252103 tendon_slack_length=0.1811203
        pennation_angle_at_optimal=0
      PathPoint P1: humerus (0.00660811 -0.258047 0.0181613)
      PathPoint P2: radius_r (0.00968445 -0.268505 -0.0839279)
    Thelen2003Muscle tric_lat_1: max_isometric_force=300 optimal_fiber_length=0.08340814 tendon_slack_length=0.1878334
        pennation_angle_at_optimal=0
      PathPoint P1: humerus (0.00694953 -0.0605193 0.0121149)
      PathPoint P2: ulna_r (-0.0185294 0.00925888 0.0244024)
      PathWrap: wrap_object=elbow method=hybrid
    Thelen2003Muscle tric_lat_2: max_isometric_force=820 optimal_fiber_length=0.08434631 tendon_slack_length=0.1948994
        pennation_angle_at_optimal=0.08726646
      PathPoint P1: humerus (0.00694953 -0.0605193 0.0121149)
      PathPoint P2: ulna_r (-0.0174903 0.00630491 0.0258034)
      PathWrap: wrap_object=elbow method=hybrid
    Thelen2003Muscle tric_lat_3: max_isometric_force=440 optimal_fiber_length=0.07230584 tendon_slack_length=0.2106348
        pennation_angle_at_optimal=0.1745329
      PathPoint P1: humerus (0.00694953 -0.0605193 0.0121149)
      PathPoint P2: ulna_r (-0.00677194 0 0.0235267)
      PathWrap: wrap_object=elbow method=hybrid
    Thelen2003Muscle tric_lat_4: max_isometric_force=550 optimal_fiber_length=0.07034354 tendon_slack_length=0.1731024
        pennation_angle_at_optimal=0.1745329
      PathPoint P1: humerus (0.0133374 -0.104761 0.0115422)
      PathPoint P2: ulna_r (-0.00677194 0 0.0235267)
      PathWrap: wrap_object=elbow method=hybrid
    Thelen2003Muscle tric_lat_5: max_isometric_force=180 optimal_fiber_length=0.07025762 tendon_slack_length=0.172891
        pennation_angle_at_optimal=0.296706
      PathPoint P1: humerus (0.0133374 -0.104761 0.0115422)
      PathPoint P2: ulna_r (-0.00950407 0.00474036 0.0219971)
      PathWrap: wrap_object=elbow method=hybrid
    ObjectGroup trapezoid: members=(trap_scap10 trap_scap11 trap_scap_1 trap_scap_2 trap_scap_3 trap_scap_4 trap_scap_5 trap_scap_6 trap_scap_7 trap_scap_8 trap_scap_9 trap_clav_1 trap_clav_2)
    ObjectGroup RotatorCuff: members=(infra_1 infra_2 infra_3 infra_4 infra_5 infra_6 ter_min_1 ter_min_2 ter_min_3 supra_1 supra_2 supra_3 supra_4 subscap10 subscap11 subscap_1 subscap_2 subscap_3 subscap_4 subscap_5 subscap_6 subscap_7 subscap_8 subscap_9)
    ObjectGroup costoclav
    ObjectGroup sternoclav
    ObjectGroup glenohum: members=(infra_1 infra_2 infra_3 infra_4 infra_5 infra_6 ter_min_1 ter_min_2 ter_min_3 supra_1 supra_2 supra_3 supra_4 subscap10 subscap11 subscap_1 subscap_2 subscap_3 subscap_4 subscap_5 subscap_6 subscap_7 subscap_8 subscap_9 delt_scap10 delt_scap11 delt_scap_1 delt_scap_2 delt_scap_3 delt_scap_4 delt_scap_5 delt_scap_6 delt_scap_7 delt_scap_8 delt_scap_9 ter_maj_1 ter_maj_2 ter_maj_3 ter_maj_4)
    ObjectGroup trap_scap: members=(trap_scap10 trap_scap11 trap_scap_1 trap_scap_2 trap_scap_3 trap_scap_4 trap_scap_5 trap_scap_6 trap_scap_7 trap_scap_8 trap_scap_9)
    ObjectGroup trap_clav: members=(trap_clav_1 trap_clav_2)
    ObjectGroup lev_scap: members=(lev_scap_1 lev_scap_2)
    ObjectGroup pect_min: members=(pect_min_1 pect_min_2 pect_min_3 pect_min_4)
    ObjectGroup rhomboid: members=(rhomboid_1 rhomboid_2 rhomboid_3 rhomboid_4 rhomboid_5)
    ObjectGroup serr_ant: members=(serr_ant10 serr_ant11 serr_ant12 serr_ant_1 serr_ant_2 serr_ant_3 serr_ant_4 serr_ant_5 serr_ant_6 serr_ant_7 serr_ant_8 serr_ant_9)
    ObjectGroup delt_scap: members=(delt_scap10 delt_scap11 delt_scap_1 delt_scap_2 delt_scap_3 delt_scap_4 delt_scap_5 delt_scap_6 delt_scap_7 delt_scap_8 delt_scap_9)
    ObjectGroup delt_clav: members=(delt_clav_1 delt_clav_2 delt_clav_3 delt_clav_4)
    ObjectGroup coracobr: members=(coracobr_1 coracobr_2 coracobr_3)
    ObjectGroup infra: members=(infra_1 infra_2 infra_3 infra_4 infra_5 infra_6)
    ObjectGroup ter_min: members=(ter_min_1 ter_min_2 ter_min_3)
    ObjectGroup ter_maj: members=(ter_maj_1 ter_maj_2 ter_maj_3 ter_maj_4)
    ObjectGroup supra: members=(supra_1 supra_2 supra_3 supra_4)
    ObjectGroup subscap: members=(subscap10 subscap11 subscap_1 subscap_2 subscap_3 subscap_4 subscap_5 subscap_6 subscap_7 subscap_8 subscap_9)
    ObjectGroup bic_c_l: members=bic_l
    ObjectGroup bic_c_b: members=(bic_b_1 bic_b_2)
    ObjectGroup triceps: members=(tric_long_1 tric_long_2 tric_long_3 tric_long_4)
    ObjectGroup lat_dorsi: members=(lat_dorsi_1 lat_dorsi_2 lat_dorsi_3 lat_dorsi_4 lat_dorsi_5 lat_dorsi_6)
    ObjectGroup pect_maj_t: members=(pect_maj_t_1 pect_maj_t_2 pect_maj_t_3 pect_maj_t_4 pect_maj_t_5 pect_maj_t_6)
    ObjectGroup pect_maj_c: members=(pect_maj_c_1 pect_maj_c_2)
    ObjectGroup tric_med: members=(tric_med_1 tric_med_2 tric_med_3 tric_med_4 tric_med_5)
    ObjectGroup brachialis: members=(brachialis_1 brachialis_2 brachialis_3 brachialis_4 brachialis_5 brachialis_6 brachialis_7)
    ObjectGroup brachiorad: members=(brachiorad_1 brachiorad_2 brachiorad_3)
    ObjectGroup tric_lat: members=(tric_lat_1 tric_lat_2 tric_lat_3 tric_lat_4 tric_lat_5)
  MarkerSet:
    Marker STER: thorax (0 -0.038 -0.0393026)
    Marker STERl: thorax (-0.02 -0.014 -0.02)
    Marker STERr: thorax (0.02 -0.014 -0.02)
    Marker XIPH: thorax (0 -0.24 -0.1)
    Marker T1: thorax (0 -0.038 0.157154)
    Marker T10: thorax (0 -0.24 0.165)
    Marker CLAV_SC: clavicle_r (0.00546624 0.0164608 -0.00160084)
    Marker CLAV_AC: clavicle_r (0.178441 0.0314268 -0.0112541)
    Marker SCAP_IA: scapula (-0.156034 -0.165643 0.00339823)
    Marker SCAP_RS: scapula (-0.159734 0.0048681 -0.0019895)
    Marker SCAP_SA: scapula (-0.138296 0.0577551 -0.0331655)
    Marker SCAP_AA: scapula (0.00381192 0.0152098 0.00237332)
    Marker SCAP_CP: scapula (0.0359617 0.0203848 -0.0512809)
    Marker SCAPl: scapula (-0.0507 0.0118 0.0009)
    Marker SCAPm: scapula (-0.1052 0.0083 -0.0005)
    Marker DELT: humerus (0.0567397 -0.0636937 0.00421932)
    Marker ARMl: humerus (0.0491625 -0.12837 0.000540535)
    Marker ARMm: humerus (0.00151848 -0.119792 -0.0264559)
    Marker ARMp_up: humerus (0.0160022 -0.0914029 0.0195313)
    Marker ARMp_do: humerus (0.00605162 -0.179846 0.0313306)
    Marker EPICl: humerus (0.0445195 -0.302741 0.00566303)
    Marker EPICm: humerus (-0.051498 -0.309674 0.0106793)
    Marker STYLr: radius_r (-0.00292886 -0.242409 -0.0939832)
    Marker STYLu: radius_r (-0.0124085 -0.248246 -0.0303479)
    Marker LARM_elb: ulna_r (-0.0129777 0.00166354 0.0423017)
    Marker WRIST: radius_r (0.0162554 -0.212001 -0.031836)
    Marker LARMm: ulna_r (-0.022137 -0.0915792 0.0208414)
    Marker LARMl: ulna_r (0.00933236 -0.0771465 -0.0525504)
    Marker LARM_ant: radius_r (-0.025 -0.122691 -0.0399066)
    Marker STYLr_up: radius_r (0.0138722 -0.212041 -0.0710703)
    Marker INDEX: hand_r (0.00915061 -0.0985555 -0.0200793)
    Marker LASTC: hand_r (0.00179096 -0.094034 0.0374001)
    Marker MEDH: hand_r (0.00304929 -0.0566211 0.0224613)
    Marker LATH: hand_r (0.0063385 -0.053544 -0.00627951)
    Marker infGlen: scapula (-0.0191032 -0.046061 -0.0431276)
    Marker antGlen: scapula (-0.0277063 -0.0321618 -0.0676292)
    Marker postGlen: scapula (-0.0187997 -0.0222177 -0.0318238)
    Marker GH_center: scapula (0.00478802 -0.021579 -0.0574649)
    Marker avant_droit: box (0.15 0 0.15) fixed=true
    Marker avant_gauche: box (0.15 0 -0.15) fixed=true
    Marker arriere_droit: box (-0.15 0 0.15) fixed=true
    Marker arriere_gauche: box (-0.15 0 -0.15) fixed=true
    Marker gauche_int: box (0.176 -0.045 -0.196) fixed=true
    Marker gauche_ext: box (0.176 -0.045 -0.231) fixed=true
    Marker droite_int: box (0.176 -0.045 0.196) fixed=true
    Marker droite_ext: box (0.176 -0.045 0.231) fixed=true
    Marker sensor1_centre: sensor1 (0 0 0) fixed=true
    Marker Z-sensor: sensor1 (0 0 0.2) fixed=true
    Marker X-sensor: sensor1 (0.1 0 0) fixed=true
