# OpenSim document version 30516
Model WUShoulderModel_S2M_box_lifting:
  gravity: 0 0 -9.8
  defaults: Thelen2003Muscle default: max_isometric_force=546 optimal_fiber_length=0.0535 tendon_slack_length=0.078
      pennation_angle_at_optimal=0.1396263 [radians] max_contraction_velocity=10 default_activation=1
  Ground
  BodySet:
    Body thorax: mass=20 [kg] mass_center=(-0.0299121 0.319062 0) inertia=(1.46587 0.751077 1.42302 0 0 0)
        meshes=(thorax.vtp hat_spine.vtp)
      WrapCylinder SpineCyl: xyz_body_rotation=(1.57 0 0) translation=(-0.0467625 0.0898259 0.0181467) quadrant=all
          radius=0.01495603 length=0.0797655
      WrapCylinder SpineCyl2: active=false xyz_body_rotation=(1.57 -1.2 0) translation=(-0.0467625 0.0300018 0.0239297)
          quadrant=all radius=0.01994138 length=0.1495603
      WrapCylinder SpineCyl3: xyz_body_rotation=(1.57 -0.21 0) translation=(-0.0856482 -0.0748699 0.0239297)
          quadrant=all radius=0.01994138 length=0.1894431
      WrapCylinder SpineCyl_t1: xyz_body_rotation=(1.57 -1.2 0) translation=(-0.0467625 0.0119648 0.0239297)
          quadrant=all radius=0.01994138 length=0.1495603
      WrapEllipsoid Thorax: xyz_body_rotation=(0.0434587 -0.331962 0.189892)
          translation=(-0.0384869 -0.126927 0.0706922) quadrant=all dimensions=(0.0997069 0.134604 0.0997069)
      WrapEllipsoid ThoraxSRA: xyz_body_rotation=(0 -0.331962 0.139892) translation=(-0.0384869 -0.0930265 0.0648095)
          quadrant=all dimensions=(0.0498534 0.0997069 0.0648095)
      WrapEllipsoid ThoraxSRA2: xyz_body_rotation=(0 -0.431962 0.139892) translation=(-0.025525 -0.116956 0.0847508)
          quadrant=all dimensions=(0.0747802 0.109678 0.0648095)
      WrapEllipsoid ThoraxLAT: xyz_body_rotation=(0 -0.431962 0.139892) translation=(-0.0335015 -0.142581 0.0648095)
          quadrant=all dimensions=(0.0747802 0.109678 0.0648095)
    Body clavicle: mass=0.2 mass_center=(-0.0122396 0.00817425 0.0634902) inertia=(0 0 0 0 0 0) meshes=clavicle.vtp
    Body scapula: mass=0.5 mass_center=(-0.0826627 -0.0447756 -0.0746261) inertia=(0 0 0 0 0 0) meshes=scapula.vtp
      WrapTorus INFSP: active=false xyz_body_rotation=(0.0253073 0.58835 0.151844)
          translation=(-0.064408 -0.0228471 -0.0128586) quadrant=all inner_radius=0.009184748 outer_radius=0.02181378
      WrapEllipsoid TMIN: xyz_body_rotation=(-2.09754 -0.280823 -1.76348)
          translation=(-0.0479903 -0.0595861 -0.0412166) quadrant=x dimensions=(0.0344428 0.0344428 0.0574047)
      WrapCylinder TRIlongglen: xyz_body_rotation=(1.37532 -0.294612 2.43596)
          translation=(-0.0412166 -0.0354761 -0.0151548) quadrant=x radius=0.003444281 length=0.03444281
    Body glenoid: mass=0 mass_center=(0 0 0) inertia=(0 0 0 0 0 0)
    Body humerus: mass=2.0325 mass_center=(0 -0.16402 0) inertia=(0.0118761 0.00409688 0.0133305 0 0 0)
        meshes=humerus.vtp
      WrapTorus WP_humerus_torus_BICl: xyz_body_rotation=(0 0.8 0) translation=(0 0.025 0) quadrant=all
          inner_radius=0.023 outer_radius=0.03
      WrapTorus WP_humerus_torus_middle: xyz_body_rotation=(1.57 0 0) translation=(0 -0.1 0) quadrant=all
          inner_radius=0.025 outer_radius=0.05
      WrapEllipsoid SUPSP: xyz_body_rotation=(0.0380482 0.00855211 -1.30673)
          translation=(0.000199414 0.00767743 0.0042874) quadrant=all dimensions=(0.0199414 0.0199414 0.0199414)
      WrapEllipsoid INFSP_and_TMIN_hum_head: xyz_body_rotation=(-0.286583 -0.00907571 -0.0684169)
          translation=(-0.000299121 0.00259238 0.00378886) quadrant=all dimensions=(0.0199414 0.0249267 0.0199414)
      WrapCylinder TMINhum: xyz_body_rotation=(1.75353 0.0692896 2.74628) translation=(-0.0013959 -0.0453666 0)
          quadrant=x radius=0.006979481 length=0.06979481
      WrapSphere TMAJ_LAT_PEC_CORBhh: translation=(0.000299121 -0.00897362 0.00598241) quadrant=all radius=0.02442818
      WrapCylinder TMAJ_LAThum: xyz_body_rotation=(1.53641 -0.0637045 1.41424)
          translation=(0.000697948 -0.0441701 -0.00548388) quadrant=-x radius=0.006979481 length=0.03988275
      WrapEllipsoid PEC1hh: xyz_body_rotation=(-0.620465 -0.310494 0.363727)
          translation=(-0.00368915 0.000498534 -0.00249267) quadrant=all dimensions=(0.0299121 0.0199414 0.0199414)
      WrapCylinder PEC12hum: xyz_body_rotation=(1.55928 -0.0774926 -0.925897)
          translation=(0.00199414 -0.0506511 -0.00169502) quadrant=x radius=0.008973619 length=0.06979481
      WrapSphere PEC23hh: translation=(-0.00857479 0.00209384 -0.000398828) quadrant=all radius=0.01994138
      WrapCylinder PEC3hum: xyz_body_rotation=(1.44094 -0.0561996 1.75196)
          translation=(0.000897362 -0.0549385 -0.000398828) quadrant=-x radius=0.00797655 length=0.06979481
      WrapCylinder LAT_TMAJhh: xyz_body_rotation=(-0.305084 -0.018326 -0.686613)
          translation=(-0.0223343 0.0101701 0.00937245) quadrant=-y radius=0.006979481 length=0.04486809
      WrapSphere LAT_TMAJ2hh: xyz_body_rotation=(-0.127235 0.276111 0.0197222)
          translation=(-0.00159531 0.00917303 0.00518476) quadrant=-z radius=0.02991206
      WrapCylinder CORBhum: xyz_body_rotation=(-1.60832 0.0959931 0.875283)
          translation=(0.00269209 -0.119848 -0.00588271) quadrant=x radius=0.00797655 length=0.04985344
      WrapEllipsoid TRIlonghh: xyz_body_rotation=(3.00162 -0.853466 2.57419)
          translation=(-0.00777714 -0.00408798 -0.0013959) quadrant=z dimensions=(0.0348974 0.0199414 0.0199414)
      WrapEllipsoid WP_humerus_TRIlonghh: translation=(0.02 -0.22 0) quadrant=-x dimensions=(0.04 0.05 0.07)
      WrapCylinder TRI: xyz_body_rotation=(-0.14015 -0.00628319 0.154985) translation=(0.00279179 -0.291044 -0.0118651)
          quadrant=all radius=0.018 length=0.03988275
      WrapEllipsoid ANC: xyz_body_rotation=(0.00750492 -0.196699 1.04929)
          translation=(0.0133607 -0.285261 -0.000797655) quadrant=-x dimensions=(0.0199414 0.0199414 0.0199414)
      WrapEllipsoid BIClong: xyz_body_rotation=(-2.00434 -1.00164 0.975465)
          translation=(0.00329033 0.0072786 0.000299121) quadrant=-y dimensions=(0.0249267 0.0199414 0.0199414)
      WrapEllipsoid Elbow_BIC_BRD: xyz_body_rotation=(-0.128631 0.137532 0.0307178)
          translation=(0.00189443 -0.288153 -0.013959) quadrant=x dimensions=(0.014956 0.014956 0.0997069)
      WrapEllipsoid Elbow_PT_ECRL: xyz_body_rotation=(-0.161094 -0.110828 0.61453)
          translation=(0.00299121 -0.286358 -0.00687977) quadrant=x dimensions=(0.0179472 0.0249267 0.0348974)
    Body ulna: mass=0.6075 mass_center=(0 -0.123087 0) inertia=(0.00308928 0.000644555 0.00335106 0 0 0)
        meshes=ulna.vtp
      WrapCylinder WP_ulna_TRI: xyz_body_rotation=(-0.015 -0.025 0) translation=(0 0 0) quadrant=all radius=0.025
          length=0.04
    Body radius: mass=0.6075 mass_center=(0 -0.123087 0) inertia=(0.00308928 0.000644555 0.00335106 0 0 0)
        meshes=radius.vtp
    Body hand_r: mass=0.4575 mass_center=(0 -0.068095 0) inertia=(0.000892 0.000547 0.00134 0 0 0)
        meshes=(pisiform.vtp scaphoid.vtp triquetrum.vtp hamate.vtp capitate.vtp trapezoid.vtp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)
      WrapTorus ECRL: xyz_body_rotation=(1.53833 0.234398 0.731118) translation=(0.0222 -0.0096 0.0208) quadrant=all
          inner_radius=0.008 outer_radius=0.016
      WrapTorus ECRB: xyz_body_rotation=(1.31266 -0.11781 -0.116239) translation=(0.0126 -0.0095 0.0186) quadrant=all
          inner_radius=0.008 outer_radius=0.01
      WrapTorus FCR: xyz_body_rotation=(-1.55596 -0.15324 -0.100007) translation=(0.0032 -0.0045 -0.019) quadrant=all
          inner_radius=0.001 outer_radius=0.0025
      WrapTorus FCU: xyz_body_rotation=(-1.57376 -0.0797616 0.39235) translation=(-0.0123 -0.0124 -0.0171) quadrant=all
          inner_radius=0.0068 outer_radius=0.008
  JointSet:
    CustomJoint ground_thorax: socket_parent_frame_connectee_name=ground_offset
        socket_child_frame_connectee_name=../thorax
      Coordinate thorax_tilt: default_value=0 range=(-1.5708 1.5708) clamped=false
      Coordinate thorax_list: default_value=0 range=(-1.5708 1.5708) clamped=false
      Coordinate thorax_rotation: default_value=0 range=(-1.5708 1.5708) clamped=false
      Coordinate thorax_tx: default_value=0 range=(-20 20) clamped=false
      Coordinate thorax_ty: default_value=0 range=(-2 4) clamped=false
      Coordinate thorax_tz: default_value=0 range=(-5 5) clamped=false
      PhysicalOffsetFrame ground_offset: socket_parent_connectee_name=../../ground translation=(0 0 0) [meters]
          orientation=(1.5708 3.15159 0) [radians]
      SpatialTransform:
        TransformAxis rotation1: coordinates=thorax_tilt axis=(0 0 1) LinearFunction(coefficients=1 0)
        TransformAxis rotation2: coordinates=thorax_list axis=(1 0 0) LinearFunction(coefficients=1 0)
        TransformAxis rotation3: coordinates=thorax_rotation axis=(0 1 0) LinearFunction(coefficients=1 0)
        TransformAxis translation1: coordinates=thorax_tx axis=(1 0 0)
            MultiplierFunction(scale=1, LinearFunction(coefficients=1 0))
        TransformAxis translation2: coordinates=thorax_ty axis=(0 1 0)
            MultiplierFunction(scale=1, LinearFunction(coefficients=1 0))
        TransformAxis translation3: coordinates=thorax_tz axis=(0 0 1)
            MultiplierFunction(scale=1, LinearFunction(coefficients=1 0))
    CustomJoint SCJ: socket_parent_frame_connectee_name=thorax_offset socket_child_frame_connectee_name=../clavicle
      Coordinate sternoclavicular_r1: default_value=0 range=(-1.570796 1.570796) clamped=true
      Coordinate sternoclavicular_r2: default_value=0 range=(-1.570796 1.570796) clamped=true
      Coordinate sternoclavicular_r3: default_value=0 range=(-1.570796 1.570796) clamped=true locked=true
      PhysicalOffsetFrame thorax_offset: socket_parent_connectee_name=../../thorax
          translation=(0.00630646 0.00690969 0.0253904)
      SpatialTransform: axes_held_at_zero=(translation1 translation2 translation3)
        TransformAxis rotation1: coordinates=sternoclavicular_r1 axis=(0.0153 0.9892987 -0.1451)
            LinearFunction(coefficients=1 0)
        TransformAxis rotation2: coordinates=sternoclavicular_r2 axis=(-0.9944725 0 -0.104997)
            LinearFunction(coefficients=1 0)
        TransformAxis rotation3: coordinates=sternoclavicular_r3 axis=(-0.103812 0.145416 0.9839092)
            LinearFunction(coefficients=1 0)
    CustomJoint ACJ: socket_parent_frame_connectee_name=clavicle_offset
        socket_child_frame_connectee_name=scapula_offset
      Coordinate Acromioclavicular_r1: default_value=0 range=(-1.570796 1.570796) clamped=true
      Coordinate Acromioclavicular_r2: default_value=0 range=(-1.570796 1.570796) clamped=true
      Coordinate Acromioclavicular_r3: default_value=0 range=(-1.570796 1.570796) clamped=true
      PhysicalOffsetFrame clavicle_offset: socket_parent_connectee_name=../../clavicle
          translation=(-0.0137883 0.0193113 0.130411) orientation=(-0.52 0.52 0)
      PhysicalOffsetFrame scapula_offset: socket_parent_connectee_name=../../scapula translation=(0 0 0)
          orientation=(-0.52 0.52 0)
      SpatialTransform: axes_held_at_zero=(translation1 translation2 translation3)
        TransformAxis rotation1: coordinates=Acromioclavicular_r1 axis=(0 0 1) LinearFunction(coefficients=1 0)
        TransformAxis rotation2: coordinates=Acromioclavicular_r2 axis=(0 1 0) LinearFunction(coefficients=1 0)
        TransformAxis rotation3: coordinates=Acromioclavicular_r3 axis=(-1 0 0) LinearFunction(coefficients=1 0)
    WeldJoint scap2glen: socket_parent_frame_connectee_name=scapula_offset socket_child_frame_connectee_name=../glenoid
      PhysicalOffsetFrame scapula_offset: socket_parent_connectee_name=../../scapula
          translation=(-0.024425 -0.037755 -0.016365) orientation=(0.0748 0.5327 -0.7991)
    CustomJoint GHJ: socket_parent_frame_connectee_name=glenoid_offset socket_child_frame_connectee_name=../humerus
      Coordinate shoulder_plane: default_value=-1.5708 default_speed_value=5.342924e-15 range=(-3 0.35) clamped=false
      Coordinate shoulder_ele: default_value=0 range=(-0.3 3) clamped=false
      Coordinate shoulder_rotation: default_value=1.5708 default_speed_value=1.000209e-14 range=(0 3) clamped=false
      PhysicalOffsetFrame glenoid_offset: socket_parent_connectee_name=../../glenoid
          translation=(-0.001891 -0.000914 0.029853)
      SpatialTransform: axes_held_at_zero=(translation1 translation2 translation3)
        TransformAxis rotation1: coordinates=shoulder_plane axis=(0.0001 1 0.0001) LinearFunction(coefficients=1 0)
        TransformAxis rotation2: coordinates=shoulder_ele axis=(0 0 1) LinearFunction(coefficients=1 0)
        TransformAxis rotation3: coordinates=shoulder_rotation axis=(0 1 0) LinearFunction(coefficients=1 0)
    CustomJoint elbow: socket_parent_frame_connectee_name=humerus_offset socket_child_frame_connectee_name=../ulna
      Coordinate elbow_flexion: default_value=0 range=(0 3) clamped=true
      PhysicalOffsetFrame humerus_offset: socket_parent_connectee_name=../../humerus
          translation=(0.00608212 -0.289549 -0.0122639)
      SpatialTransform: axes_held_at_zero=(rotation1 rotation2 translation1 translation2 translation3)
        TransformAxis rotation3: coordinates=elbow_flexion axis=(0.04940001 0.03660001 0.9981082)
            LinearFunction(coefficients=1 0)
    CustomJoint radioulnar: socket_parent_frame_connectee_name=ulna_offset socket_child_frame_connectee_name=../radius
      Coordinate pro_sup: default_value=0 range=(-1.570796 1.570796) clamped=true
      PhysicalOffsetFrame ulna_offset: socket_parent_connectee_name=../../ulna
          translation=(0.000408504 -0.0117475 0.0204242)
      SpatialTransform: axes_held_at_zero=(rotation1 rotation3 translation1 translation2 translation3)
        TransformAxis rotation2: coordinates=pro_sup axis=(-0.01716099 0.9926656 -0.119668)
            LinearFunction(coefficients=1 0)
    CustomJoint radius_hand_r: socket_parent_frame_connectee_name=radius_offset
        socket_child_frame_connectee_name=../hand_r
      Coordinate hand_r_Add: default_value=0 range=(-1.2 1.2) clamped=true
      Coordinate hand_r_Flex: default_value=0 range=(-1 1) clamped=true
      PhysicalOffsetFrame radius_offset: socket_parent_connectee_name=../../radius
          translation=(0.0174787 -0.234992 0.024276)
      SpatialTransform: axes_held_at_zero=(rotation2 translation1 translation2 translation3)
        TransformAxis rotation1: coordinates=hand_r_Add axis=(0 0 1) LinearFunction(coefficients=1 0)
        TransformAxis rotation3: coordinates=hand_r_Flex axis=(1 0 0) LinearFunction(coefficients=1 0)
  ForceSet:
    Thelen2003Muscle LVS: max_isometric_force=169.9564 optimal_fiber_length=0.1437317 tendon_slack_length=0.005082005
        pennation_angle_at_optimal=0
      PathPoint P1: socket_parent_frame_connectee_name=../../../thorax (-0.0371538 0.094161 0.0224777)
      PathPoint P2: socket_parent_frame_connectee_name=../../../scapula (-0.0776652 0.000771905 -0.109819)
    Thelen2003Muscle TRP1: max_isometric_force=280.5671 optimal_fiber_length=0.1013721 tendon_slack_length=0.01518407
        pennation_angle_at_optimal=0
      PathPoint P1: socket_parent_frame_connectee_name=../../../thorax (-0.0587873 0.0965659 0.00191913)
      PathPoint P2: socket_parent_frame_connectee_name=../../../clavicle (-0.0294411 0.0239066 0.0945424)
      PathWrap: wrap_object=SpineCyl
    Thelen2003Muscle TRP2: max_isometric_force=162.45 optimal_fiber_length=0.08371994 tendon_slack_length=0.04201256
        pennation_angle_at_optimal=0
      PathPoint P1: socket_parent_frame_connectee_name=../../../thorax (-0.077245 0.0313656 0.00355867)
      PathPoint P2: socket_parent_frame_connectee_name=../../../scapula (-0.0447756 -0.00296403 -0.0114809)
      PathWrap: wrap_object=SpineCyl2
    Thelen2003Muscle TRP3: max_isometric_force=155.2832 optimal_fiber_length=0.07246607 tendon_slack_length=0.01762886
        pennation_angle_at_optimal=0
      PathPoint P1: socket_parent_frame_connectee_name=../../../thorax (-0.0918954 -0.0153597 0.00249867)
      PathPoint P2: socket_parent_frame_connectee_name=../../../scapula (-0.0669844 -0.00747356 -0.0509934)
    Thelen2003Muscle TRP4: max_isometric_force=557.2435 optimal_fiber_length=0.1167916 tendon_slack_length=0.004554604
        pennation_angle_at_optimal=0
      PathPoint P1: socket_parent_frame_connectee_name=../../../thorax (-0.115641 -0.105255 0.000681621)
      PathPoint P2: socket_parent_frame_connectee_name=../../../scapula (-0.0909197 -0.0148608 -0.0905847)
      PathWrap: wrap_object=SpineCyl3 method=hybrid
    Thelen2003Muscle RMN: max_isometric_force=301.6171 optimal_fiber_length=0.09725172 tendon_slack_length=0.02082499
        pennation_angle_at_optimal=0
      PathPoint P1: socket_parent_frame_connectee_name=../../../thorax (-0.0628153 0.0557977 0.00299121)
      PathPoint P2: socket_parent_frame_connectee_name=../../../scapula (-0.0907648 -0.0151011 -0.115107)
      PathWrap: wrap_object=SpineCyl2
    Thelen2003Muscle RMJ1: max_isometric_force=185.9359 optimal_fiber_length=0.07875074 tendon_slack_length=0.02168442
        pennation_angle_at_optimal=0
      PathPoint P1: socket_parent_frame_connectee_name=../../../thorax (-0.0788272 0.00941237 0.00142958)
      PathPoint P2: socket_parent_frame_connectee_name=../../../scapula (-0.103721 -0.0485235 -0.119606)
      PathWrap: wrap_object=SpineCyl3
    Thelen2003Muscle RMJ2: max_isometric_force=111.5701 optimal_fiber_length=0.09039301 tendon_slack_length=0.04715527
        pennation_angle_at_optimal=0
      PathPoint P1: socket_parent_frame_connectee_name=../../../thorax (-0.086745 -0.0249267 0.00142958)
      PathPoint P2: socket_parent_frame_connectee_name=../../../scapula (-0.114809 -0.113661 -0.111365)
      PathWrap: wrap_object=SpineCyl3
    Thelen2003Muscle SRA1: max_isometric_force=365.1178 optimal_fiber_length=0.1007835 tendon_slack_length=0.08255882
        pennation_angle_at_optimal=0
      PathPoint P1: socket_parent_frame_connectee_name=../../../thorax (-0.000941264 -0.0560017 0.119468)
      PathPoint P2: socket_parent_frame_connectee_name=../../../scapula (-0.10086 -0.0542434 -0.113174)
      PathWrap: wrap_object=ThoraxSRA method=hybrid
    Thelen2003Muscle SRA2: max_isometric_force=179.9626 optimal_fiber_length=0.1437442 tendon_slack_length=0.04725609
        pennation_angle_at_optimal=0
      PathPoint P1: socket_parent_frame_connectee_name=../../../thorax (-0.000624088 -0.101712 0.137421)
      PathPoint P2: socket_parent_frame_connectee_name=../../../scapula (-0.106888 -0.0715149 -0.113108)
      PathWrap: wrap_object=ThoraxSRA method=hybrid
    Thelen2003Muscle SRA3: max_isometric_force=377.9217 optimal_fiber_length=0.1417125 tendon_slack_length=0.009322368
        pennation_angle_at_optimal=0
      PathPoint P1: socket_parent_frame_connectee_name=../../../thorax (-0.0113401 -0.161343 0.148432)
      PathPoint P2: socket_parent_frame_connectee_name=../../../scapula (-0.111231 -0.088884 -0.112791)
      PathWrap: wrap_object=ThoraxSRA2 method=hybrid
    Thelen2003Muscle SBCL: max_isometric_force=195.8076 optimal_fiber_length=0.02317102 tendon_slack_length=0.04224757
        pennation_angle_at_optimal=0
      PathPoint P1: socket_parent_frame_connectee_name=../../../thorax (-0.000925142 -0.0131603 0.0390115)
      PathPoint P2: socket_parent_frame_connectee_name=../../../clavicle (-0.0151524 0.008742 0.0728472)
    Thelen2003Muscle PMN: max_isometric_force=218.7229 optimal_fiber_length=0.09934119 tendon_slack_length=0.004316568
        pennation_angle_at_optimal=0
      PathPoint P1: socket_parent_frame_connectee_name=../../../thorax (0.0323499 -0.0748581 0.089156)
      PathPoint P2: socket_parent_frame_connectee_name=../../../scapula (0.0137771 -0.0473818 -0.0304474)
    Thelen2003Muscle DELT1: max_isometric_force=556.8 optimal_fiber_length=0.17791 tendon_slack_length=0.03178415
        pennation_angle_at_optimal=0.3839724
      PathPoint P1: socket_parent_frame_connectee_name=../../../clavicle (-0.0232548 0.0185552 0.0952719)
      PathPoint P2: socket_parent_frame_connectee_name=../../../clavicle (-0.00221954 0.0303141 0.12568)
      PathPoint P3: socket_parent_frame_connectee_name=../../../humerus (0.00454575 -0.103644 0.00773243)
    Thelen2003Muscle DELT2: max_isometric_force=1098.4 optimal_fiber_length=0.1372467 tendon_slack_length=0.04862992
        pennation_angle_at_optimal=0.2617994
      PathPoint P1: socket_parent_frame_connectee_name=../../../scapula (-0.0316063 -0.00367643 0.00163757)
      PathPoint P2: socket_parent_frame_connectee_name=../../../scapula (-0.0317357 -0.00555618 0.0210803)
      PathPoint P3: socket_parent_frame_connectee_name=../../../humerus (-0.00348999 -0.057778 0.028278)
      PathPoint P4: socket_parent_frame_connectee_name=../../../humerus (0.00454575 -0.103644 0.00773243)
    Thelen2003Muscle DELT3: max_isometric_force=944.7 optimal_fiber_length=0.1323062 tendon_slack_length=0.1050477
        pennation_angle_at_optimal=0.3141593
      PathPoint P1: socket_parent_frame_connectee_name=../../../scapula (-0.0678093 -0.00180103 -0.0441564)
      PathPoint P2: socket_parent_frame_connectee_name=../../../scapula (-0.0828787 -0.0272329 0.00686248)
      PathPoint P3: socket_parent_frame_connectee_name=../../../humerus (-0.01853 -0.0495563 0.00588334)
      PathPoint P4: socket_parent_frame_connectee_name=../../../humerus (0.00454575 -0.103644 0.00773243)
    Thelen2003Muscle SUPSP: max_isometric_force=410.7 optimal_fiber_length=0.1297634 tendon_slack_length=0.02762345
        pennation_angle_at_optimal=0.122173
      PathPoint P1: socket_parent_frame_connectee_name=../../../scapula (-0.076968 -0.0133058 -0.074049)
      PathPoint P2: socket_parent_frame_connectee_name=../../../scapula (-0.0644995 -0.0015351 -0.0467318)
      PathPoint P3: socket_parent_frame_connectee_name=../../../humerus (0.00355535 0.0311398 0.00550133)
      PathPoint P4: socket_parent_frame_connectee_name=../../../humerus (0.0142131 0.0167949 0.0208824)
      PathWrap: wrap_object=SUPSP method=hybrid
    Thelen2003Muscle INFSP: max_isometric_force=864.6 optimal_fiber_length=0.1480408 tendon_slack_length=0.03770957
        pennation_angle_at_optimal=0.3228859
      PathPoint P1: socket_parent_frame_connectee_name=../../../scapula (-0.101015 -0.0626317 -0.079624)
      PathPoint P2: socket_parent_frame_connectee_name=../../../scapula (-0.0489821 -0.0556659 -0.0251489)
      PathPoint P3: socket_parent_frame_connectee_name=../../../humerus (-0.00508263 0.0080173 0.0263193)
      PathWrap: wrap_object=INFSP
      PathWrap pathwrap_0: wrap_object=INFSP_and_TMIN_hum_head method=hybrid
    Thelen2003Muscle SUBSC: max_isometric_force=944.3 optimal_fiber_length=0.1816407 tendon_slack_length=0.008347458
        pennation_angle_at_optimal=0.3490659
      PathPoint P1: socket_parent_frame_connectee_name=../../../scapula (-0.0826627 -0.0447756 -0.0746261)
      PathPoint P2: socket_parent_frame_connectee_name=../../../scapula (-0.0449006 -0.0370696 -0.0383135)
      PathPoint P3: socket_parent_frame_connectee_name=../../../humerus (0.00740965 0.0103442 -0.022619)
      PathPoint P4: socket_parent_frame_connectee_name=../../../humerus (0.0199409 -0.00828737 -0.0017436)
    Thelen2003Muscle TMIN: max_isometric_force=605.4 optimal_fiber_length=0.05052027 tendon_slack_length=0.1157617
        pennation_angle_at_optimal=0.418879
      PathPoint P1: socket_parent_frame_connectee_name=../../../scapula (-0.0941441 -0.0774746 -0.0469922)
      PathPoint P2: socket_parent_frame_connectee_name=../../../scapula (-0.0861287 -0.060448 -0.0117884)
      PathPoint P3: socket_parent_frame_connectee_name=../../../humerus (-0.00845246 -0.0141352 0.0268061)
      PathPoint P4: socket_parent_frame_connectee_name=../../../humerus (0.00653711 -0.00364346 0.0216146)
    Thelen2003Muscle TMAJ: max_isometric_force=234.9 optimal_fiber_length=0.1631319 tendon_slack_length=0.06311372
        pennation_angle_at_optimal=0.2792527
      PathPoint P1: socket_parent_frame_connectee_name=../../../scapula (-0.120216 -0.123715 -0.0816932)
      PathPoint P2: socket_parent_frame_connectee_name=../../../scapula (-0.0520682 -0.121946 -0.00283755)
      PathPoint P3: socket_parent_frame_connectee_name=../../../humerus (0.00368816 -0.0448681 -0.00674322)
    Thelen2003Muscle PECM1: max_isometric_force=983.4 optimal_fiber_length=0.1039118 tendon_slack_length=0.04866114
        pennation_angle_at_optimal=0.296706
      PathPoint P1: socket_parent_frame_connectee_name=../../../clavicle (0.00106363 0.00585337 0.0493812)
      PathPoint P2: socket_parent_frame_connectee_name=../../../clavicle (-0.000467462 0.00535981 0.056924)
      PathPoint P3: socket_parent_frame_connectee_name=../../../humerus (0.0159531 -0.040377 0.00498534)
    Thelen2003Muscle PECM2: max_isometric_force=699.7 optimal_fiber_length=0.1375146 tendon_slack_length=0.09380461
        pennation_angle_at_optimal=0.4363323
      PathPoint P1: socket_parent_frame_connectee_name=../../../thorax (0.0247929 -0.0474437 0.0174152)
      PathPoint P2: socket_parent_frame_connectee_name=../../../thorax (0.0421932 -0.0433438 0.0805756)
      PathPoint P3: socket_parent_frame_connectee_name=../../../humerus (0.0159531 -0.0353917 0.00498534)
    Thelen2003Muscle PECM3: max_isometric_force=446.7 optimal_fiber_length=0.176252 tendon_slack_length=0.09604906
        pennation_angle_at_optimal=0.4363323
      PathPoint P1: socket_parent_frame_connectee_name=../../../thorax (0.0624706 -0.147326 0.0219955)
      PathPoint P2: socket_parent_frame_connectee_name=../../../thorax (0.0431414 -0.0927882 0.0825902)
      PathPoint P3: socket_parent_frame_connectee_name=../../../humerus (0.0159531 -0.0299121 0.00498534)
    Thelen2003Muscle LAT: max_isometric_force=1129.7 optimal_fiber_length=0.2261084 tendon_slack_length=0.07514176
        pennation_angle_at_optimal=0.3316126
      PathPoint P1: socket_parent_frame_connectee_name=../../../thorax (-0.0944244 -0.160526 0.000510643)
      PathPoint P2: socket_parent_frame_connectee_name=../../../humerus (0.0020154 -0.0188354 -0.0214022)
      PathPoint P3: socket_parent_frame_connectee_name=../../../humerus (0.00988845 -0.0222682 -0.00879614)
      PathWrap: wrap_object=ThoraxLAT method=hybrid
    Thelen2003Muscle CORB: max_isometric_force=306.9 optimal_fiber_length=0.08343138 tendon_slack_length=0.06167103
        pennation_angle_at_optimal=0
      PathPoint P1: socket_parent_frame_connectee_name=../../../scapula (0.0143512 -0.0473818 -0.0304474)
      PathPoint P3: socket_parent_frame_connectee_name=../../../humerus (0 -0.127625 -0.0116252)
      PathWrap: wrap_object=CORBhum
      PathWrap pathwrap_0: wrap_object=TMAJ_LAT_PEC_CORBhh
    Thelen2003Muscle bic_l: max_isometric_force=700 optimal_fiber_length=0.1446988 tendon_slack_length=0.2615106
        pennation_angle_at_optimal=0
      PathPoint P1: socket_parent_frame_connectee_name=../../../scapula (-0.0136 -0.0251 -0.0218)
      PathPoint P2: socket_parent_frame_connectee_name=../../../humerus (0.015 0.01 0.015)
      PathPoint P3: socket_parent_frame_connectee_name=../../../radius (0.000914 -0.037639 -0.003846)
      PathWrap: wrap_object=WP_humerus_torus_BICl method=hybrid range=(-1 2)
      PathWrap pathwrap_0: wrap_object=WP_humerus_torus_middle method=hybrid range=(2 3)
      PathWrap pathwrap_1: wrap_object=Elbow_BIC_BRD method=hybrid
    Thelen2003Muscle bic_b: max_isometric_force=894 optimal_fiber_length=0.1308 tendon_slack_length=0.2165
        pennation_angle_at_optimal=0
      PathPoint P1: socket_parent_frame_connectee_name=../../../scapula (0.01182 -0.04094 -0.02483)
      PathPoint P2: socket_parent_frame_connectee_name=../../../radius (0.000914 -0.037639 -0.003846)
      PathWrap: wrap_object=WP_humerus_torus_middle method=hybrid
      PathWrap pathwrap_0: wrap_object=Elbow_BIC_BRD method=hybrid
    Thelen2003Muscle tric_long: max_isometric_force=2216 optimal_fiber_length=0.1167 tendon_slack_length=0.2338
        pennation_angle_at_optimal=0.1745329
      PathPoint P1: socket_parent_frame_connectee_name=../../../scapula (-0.045508 -0.044998 -0.01182)
      PathPoint P2: socket_parent_frame_connectee_name=../../../humerus (-0.022605 -0.28 -0.0145687)
      PathPoint P3: socket_parent_frame_connectee_name=../../../ulna (-0.027814 -0.009128 -0.000839)
      PathWrap: wrap_object=TRIlonghh method=hybrid
      PathWrap pathwrap_0: wrap_object=WP_ulna_TRI method=hybrid
    ObjectGroup new_Mick: members=(bic_l bic_b tric_long)
    ObjectGroup Scapulothoracic: members=(SBCL SRA1 SRA2 SRA3 TRP1 TRP2 TRP3 TRP4 LVS RMN RMJ1 RMJ2 PMN)
    ObjectGroup Glenohumeral: members=(DELT1 DELT2 DELT3 INFSP LAT PECM1 PECM2 PECM3 SUBSC SUPSP TMAJ TMIN CORB)
  MarkerSet:
    Marker STER: socket_parent_frame_connectee_name=../thorax (0.0360082 -0.0366429 0)
    Marker STERl: socket_parent_frame_connectee_name=../thorax (0.0153393 -0.0141106 -0.0214376)
    Marker STERr: socket_parent_frame_connectee_name=../thorax (0.0153393 -0.0141106 0.0214376)
    Marker XIPH: socket_parent_frame_connectee_name=../thorax (0.0725137 -0.175 0)
    Marker T10: socket_parent_frame_connectee_name=../thorax (-0.117 -0.175 0)
    Marker T1: socket_parent_frame_connectee_name=../thorax (-0.115 -0.0366429 0)
    Marker CLAV_SC: socket_parent_frame_connectee_name=../clavicle (0 0 0)
    Marker CLAV_AC: socket_parent_frame_connectee_name=../clavicle (-0.019036 0.0219355 0.120411)
    Marker SCAP_IA: socket_parent_frame_connectee_name=../scapula (-0.132043 -0.143512 -0.0906994)
    Marker SCAP_RS: socket_parent_frame_connectee_name=../scapula (-0.104647 -0.0145433 -0.111712)
    Marker SCAP_AA: socket_parent_frame_connectee_name=../scapula (-0.0587916 -0.00636254 0.0110066)
    Marker SCAP_CP: socket_parent_frame_connectee_name=../scapula (0.0211056 -0.0478995 -0.0286698)
    Marker SCAP_SA: socket_parent_frame_connectee_name=../scapula (-0.0739264 0.0406592 -0.0971451)
    Marker SCAPl: socket_parent_frame_connectee_name=../scapula (-0.0721987 -0.0075398 -0.0200538)
    Marker SCAPm: socket_parent_frame_connectee_name=../scapula (-0.0936802 -0.00714876 -0.0600076)
    Marker EPICl: socket_parent_frame_connectee_name=../humerus (-0.00158659 -0.284165 0.0261137)
    Marker EPICm: socket_parent_frame_connectee_name=../humerus (-0.00448261 -0.279179 -0.0531062)
    Marker DELT: socket_parent_frame_connectee_name=../humerus (0.016933 -0.118876 0.0364681)
    Marker ARMp_up: socket_parent_frame_connectee_name=../humerus (-0.0497287 -0.174094 0.0213422)
    Marker ARMl: socket_parent_frame_connectee_name=../humerus (-0.021405 -0.145884 0.0469278)
    Marker ARMm: socket_parent_frame_connectee_name=../humerus (0.013567 -0.203161 -0.0401942)
    Marker ARMp_do: socket_parent_frame_connectee_name=../humerus (-0.0456688 -0.227576 0.00443536)
    Marker LARMm: socket_parent_frame_connectee_name=../ulna (-0.022137 -0.0915792 0.0208414)
    Marker LARMl: socket_parent_frame_connectee_name=../ulna (0.0357106 -0.0903409 0.0634957)
    Marker LARM_ant: socket_parent_frame_connectee_name=../radius (0.0385344 -0.140088 0.0229845)
    Marker STYLr_up: socket_parent_frame_connectee_name=../radius (0.0407397 -0.199777 0.0361221)
    Marker STYLr: socket_parent_frame_connectee_name=../radius (0.0557827 -0.230296 0.0235013)
    Marker STYLu: socket_parent_frame_connectee_name=../radius (-0.013148 -0.231687 0.0348427)
    Marker LARM_elb: socket_parent_frame_connectee_name=../ulna (-0.0377764 -0.00525084 0.00601224)
    Marker LATH: socket_parent_frame_connectee_name=../hand_r (0.017874 -0.0316959 0.0218251)
    Marker LASTC: socket_parent_frame_connectee_name=../hand_r (-0.0210848 -0.0698007 0.0129684)
    Marker MEDH: socket_parent_frame_connectee_name=../hand_r (-0.0194545 -0.029831 0.0127082)
    Marker WRIST: socket_parent_frame_connectee_name=../radius (0.0174787 -0.203367 0.0390625)
    Marker INDEX: socket_parent_frame_connectee_name=../hand_r (0.0179184 -0.0766692 0.0230373)
