# OpenSim document version 30000
ForceSet DAS3-append:
  defaults: CoordinateActuator default: optimal_force=2
  # Box actuators
  CoordinateActuator box_Rx: coordinate=box_rotX optimal_force=100
  CoordinateActuator box_Ry: coordinate=box_rotY optimal_force=100
  CoordinateActuator box_Rz: coordinate=box_rotZ optimal_force=100
  CoordinateActuator box_Tx: coordinate=box_transX optimal_force=100
  CoordinateActuator box_Ty: coordinate=box_transY optimal_force=100
  CoordinateActuator box_Tz: coordinate=box_transZ optimal_force=100
  # Thorax actuator
  CoordinateActuator Th_rotX: coordinate=Th_rotX optimal_force=300
  CoordinateActuator Th_rotY: coordinate=Th_rotY optimal_force=300
  CoordinateActuator Th_rotZ: coordinate=Th_rotZ optimal_force=300
  CoordinateActuator Th_transX: coordinate=Th_transX optimal_force=1000
  CoordinateActuator Th_transY: coordinate=Th_transY optimal_force=1000
  CoordinateActuator Th_transZ: coordinate=Th_transZ optimal_force=1000
  # Prosupination actuator
  CoordinateActuator PS_y: coordinate=PS_y optimal_force=10
  # Hand actuator
  CoordinateActuator wrist_dev_r: coordinate=wrist_dev_r optimal_force=100
  CoordinateActuator wrist_flex_r: coordinate=wrist_flex_r optimal_force=100
  # Clavicle residual actuator
  CoordinateActuator SC_x: coordinate=SC_x
  CoordinateActuator SC_y: coordinate=SC_y
  CoordinateActuator SC_z: coordinate=SC_z
  # Scap residual actuator
  CoordinateActuator AC_x: coordinate=AC_x
  CoordinateActuator AC_y: coordinate=AC_y
  CoordinateActuator AC_z: coordinate=AC_z
  # Humerus residual actuator
  CoordinateActuator GH_x: coordinate=GH_x
  CoordinateActuator GH_y: coordinate=GH_y
  CoordinateActuator GH_z: coordinate=GH_z
  # Forearm actuator
  CoordinateActuator EL_x: coordinate=EL_x
