# OpenSim document version 30000
ScaleTool model_scaled:
  mass: 70 [kg]
  height: -1
  age: -1
  ModelScaler:
    apply: true
    scaling_order: measurements manualScale
    marker_file: C:\Users\micka\Dropbox\Projet_EMGdriven\mickael_nz\data\IRSST_DapO\0_markers/static.trc
    time_range: 1 2
    preserve_mass_distribution: true
    output_model_file: C:\Users\micka\Dropbox\Projet_EMGdriven\mickael_nz\data\IRSST_DapO\_models\1_scaled_DAS3.osim
    output_scale_file: C:\Users\micka\Dropbox\Projet_EMGdriven\mickael_nz\data\IRSST_DapO\_xml\1_scale_set_DAS3.xml
    MeasurementSet:
      Measurement thorax_height: apply=true
        MarkerPair: markers=(STER XIPH)
        MarkerPair: markers=(T1 T10)
        BodyScale thoraxPre: axes=Y
        BodyScale thorax: axes=Y
      Measurement thorax_width: apply=true
        MarkerPair: markers=(STER T1)
        MarkerPair: markers=(XIPH T10)
        BodyScale thoraxPre: axes=(X Z)
        BodyScale thorax: axes=(X Z)
      Measurement clavicle_Length: apply=true
        MarkerPair: markers=(CLAV_SC CLAV_AC)
        BodyScale clavicle_1: axes=(X Y Z)
        BodyScale clavicle_2: axes=(X Y Z)
        BodyScale clavicle_r: axes=(X Y Z)
      Measurement scapula_global: apply=true
        MarkerPair: markers=(SCAP_IA SCAP_RS)
        MarkerPair: markers=(SCAP_RS SCAP_AA)
        MarkerPair: markers=(SCAP_AA SCAP_IA)
        MarkerPair: markers=(SCAP_AA SCAP_CP)
        BodyScale scapula: axes=Z
      Measurement scapula_height: apply=true
        MarkerPair: markers=(SCAP_IA SCAP_RS)
        MarkerPair: markers=(SCAP_IA SCAP_AA)
        BodyScale scapula: axes=Y
      Measurement scapula_width: apply=true
        MarkerPair: markers=(SCAP_AA SCAP_RS)
        BodyScale scapula: axes=X
      Measurement humerus_length: apply=true
        MarkerPair: markers=(CLAV_AC EPICl)
        MarkerPair: markers=(CLAV_AC EPICm)
        BodyScale humerus: axes=(X Y Z)
      Measurement forearm_length: apply=true
        MarkerPair: markers=(EPICl STYLr)
        MarkerPair: markers=(EPICm STYLu)
        BodyScale ulna_r: axes=(X Y Z)
        BodyScale radius_r: axes=(X Y Z)
      Measurement Hand: apply=true
        MarkerPair: markers=(INDEX LASTC)
        BodyScale hand_r: axes=(X Y Z)
    ScaleSet:
      Scale: scales=(1 1 1) segment=ground apply=true
      Scale: scales=(1 1 1) segment=box apply=true
      Scale: scales=(1 1 1) segment=sensor1 apply=true
  MarkerPlacer:
    apply: true
    time_range: 0 5.39
    max_marker_movement: -1
    IKTaskSet:
      IKMarkerTask STER: apply=true weight=10
      IKMarkerTask STERl: apply=true weight=5
      IKMarkerTask STERr: apply=true weight=5
      IKMarkerTask XIPH: apply=true weight=5
      IKMarkerTask T10: apply=true weight=10
      IKMarkerTask T1: apply=true weight=10
      IKMarkerTask CLAV_SC: apply=true weight=20
      IKMarkerTask CLAV_AC: apply=true weight=20
      IKMarkerTask SCAP_IA: apply=true weight=5
      IKMarkerTask SCAP_RS: apply=true weight=5
      IKMarkerTask SCAP_AA: apply=true weight=5
      IKMarkerTask SCAP_CP: apply=true weight=5
      IKMarkerTask SCAP_SA: apply=true weight=0
      IKMarkerTask SCAPl: apply=true weight=0
      IKMarkerTask SCAPm: apply=true weight=0
      IKMarkerTask EPICl: apply=true weight=10
      IKMarkerTask EPICm: apply=true weight=40
      IKMarkerTask DELT: apply=true weight=0
      IKMarkerTask ARMp_up: apply=true weight=0
      IKMarkerTask ARMl: apply=true weight=0
      IKMarkerTask ARMm: apply=true weight=0
      IKMarkerTask ARMp_do: apply=true weight=0
      IKMarkerTask STYLr: apply=true weight=20
      IKMarkerTask STYLu: apply=true weight=20
      IKMarkerTask LARM_elb: apply=true weight=5
      IKMarkerTask LARMm: apply=true weight=0
      IKMarkerTask LARMl: apply=true weight=0
      IKMarkerTask LARM_ant: apply=true weight=0
      IKMarkerTask STYLr_up: apply=true weight=0
      IKMarkerTask WRIST: apply=true weight=0
      IKMarkerTask INDEX: apply=true weight=10
      IKMarkerTask LATH: apply=true weight=2
      IKMarkerTask LASTC: apply=true weight=10
      IKMarkerTask MEDH: apply=true weight=2
      IKMarkerTask avant_droit: apply=true weight=1
      IKMarkerTask avant_gauche: apply=true weight=1
      IKMarkerTask arriere_droit: apply=true weight=1
      IKMarkerTask arriere_gauche: apply=true weight=1
      IKMarkerTask gauche_int: apply=true weight=1
      IKMarkerTask gauche_ext: apply=true weight=1
      IKMarkerTask droite_int: apply=true weight=1
      IKMarkerTask droite_ext: apply=true weight=1
