# OpenSim document version 30000
AnalyzeTool AdjustedModel:
  replace_force_set: false
  force_set_files: append_actuators_DAS3.xml
  initial_time: 0
  final_time: 2.66
  output_precision: 8
  solve_for_equilibrium_for_auxiliary_states: false
  maximum_number_of_integrator_steps: 30000
  maximum_integrator_step_size: 1
  minimum_integrator_step_size: 1e-8
  integrator_error_tolerance: 1e-5
  lowpass_cutoff_frequency_for_coordinates: 5
  AnalysisSet Analyses:
    StaticOptimization: start_time=0 end_time=2.66 step_interval=5 in_degrees=true use_model_force_set=true
        activation_exponent=2 use_muscle_physiology=true optimizer_convergence_criterion=0.0001
        optimizer_max_iterations=10000
