# OpenSim document version 30000
ForceSet Wu_model_with_box:
  defaults: CoordinateActuator default: optimal_force=2
  CoordinateActuator box_Rx: coordinate=box_rotX optimal_force=100
  CoordinateActuator box_Ry: coordinate=box_rotY optimal_force=100
  CoordinateActuator box_Rz: coordinate=box_rotZ optimal_force=100
  CoordinateActuator box_Tx: coordinate=box_transX optimal_force=100
  CoordinateActuator box_Ty: coordinate=box_transY optimal_force=100
  CoordinateActuator box_Tz: coordinate=box_transZ optimal_force=100
  CoordinateActuator thorax_Tx: coordinate=thorax_tx optimal_force=1000
  CoordinateActuator thorax_Ty: coordinate=thorax_ty optimal_force=1000
  CoordinateActuator thorax_Tz: coordinate=thorax_tz optimal_force=1000
  CoordinateActuator thorax_Rx: coordinate=thorax_list optimal_force=300
  CoordinateActuator thorax_Ry: coordinate=thorax_rotation optimal_force=300
  CoordinateActuator thorax_Rz: coordinate=thorax_tilt optimal_force=300
  CoordinateActuator elbow_Rz: coordinate=elbow_flexion optimal_force=50
  CoordinateActuator elbow_Ry: coordinate=pro_sup optimal_force=50
  CoordinateActuator hand_Rz: coordinate=hand_r_Add optimal_force=30
  CoordinateActuator hand_Rx: coordinate=hand_r_Flex optimal_force=30
  # RESIDUAL ACTUATORS
  CoordinateActuator SC1: coordinate=sternoclavicular_r1
  CoordinateActuator SC2: coordinate=sternoclavicular_r2
  CoordinateActuator SC3: coordinate=sternoclavicular_r3
  CoordinateActuator AC1: coordinate=Acromioclavicular_r1
  CoordinateActuator AC2: coordinate=Acromioclavicular_r2
  CoordinateActuator AC3: coordinate=Acromioclavicular_r3
  CoordinateActuator GH1: coordinate=shoulder_plane
  CoordinateActuator GH2: coordinate=shoulder_ele
  CoordinateActuator GH3: coordinate=shoulder_rotation
