# OpenSim document version 30516
AnalyzeTool model_scaled:
  replace_force_set: false
  results_directory: C:\Users\micka\Dropbox\Projet_EMGdriven\mickael_nz\data\IRSST_DapO\Wu_Romain_xml\results
  output_precision: 8
  initial_time: 0
  final_time: 2.66
  solve_for_equilibrium_for_auxiliary_states: false
  maximum_number_of_integrator_steps: 20000
  maximum_integrator_step_size: 1
  minimum_integrator_step_size: 1e-8
  integrator_error_tolerance: 1e-5
  coordinates_file: results/F6H1_1.mot
  lowpass_cutoff_frequency_for_coordinates: 5
  AnalysisSet Analyses:
    JointReaction: start_time=0 end_time=2.66 step_interval=1 in_degrees=true
        forces_file=C:\Users\micka\Dropbox\Projet_EMGdriven\mickael_nz\data\IRSST_DapO\Wu_Romain_xml\results/AdjustedModel_StaticOptimization_force.sto
        joint_names=GHJ apply_on_bodies=parent express_in_frame=glenoid
